// COMSOL Multiphysics 5.6.0.341 model "Main_mourhpiece.mph"
// Outline of the model tree

Parameters
  d = 15.86[mm]  // kiever input diameter
  L = 93.7[mm]  // mouthpiece full length
  p1 = 1.6[mm]  // tip length
  p2 = 0.0142[m]  // tip opening
  p3 = 11.5[mm]  // bottom window diameter
  p4 = 37.7[mm]  // window length
  p5 = 14.1[mm]  // slit length
  l = L-p4*1.2  // kiever mouthpiece coupling
  gamma = 3[deg]  // slit angle
  D = 27.8[mm]  // external max diameter
  rL = 0.0695[m]  // reed length
  rh = 2.9[mm]  // reed height
  rT = 15.65[mm]  // tip reed length
  rRT = 12[mm]  // radius on reed tip
  alfa2 = 3[deg]  // 1.5[deg] slit plane - axial angle MAX 8 min 0
  incl = -D/2+(rL*sin(alfa2))  // altezza punta
  tip_o = ((D/2)^2-incl^2)^0.5  // corda tip
  beta = asin((tan(-alfa2)*(rL+0.001)+D/2-rh)/(L-l))  // axial inclination
  DD = (((0.5*rT))^2+(incl+rh)^2)^0.5  // corda tip dopo conicizzazione
  l1up = d*0.8  // cross sect geometry like rect
  l1down = l1up  // cross sect geom rect down lato
  ddown = 3[mm]  // internal distance from slit
  h1 = l1up  // altezza interna
  r1up = d/2*0.8  // raggio raccordo interno r=0.1[mm]
  r1down = r1up  // raggio raccordo interno sotto
  campion = (L-l)/5
  s1x = (p4*1.2)/5
  s1y = s4y/4  // 2.6[mm]
  s2x = (p4*1.2)/5*2
  s2y = s4y/2
  s3x = (p4*1.2)/5*3
  s3y = s4y/4*3.2  // 9.9mm
  s4x = (p4*1.2)/5*4.8
  s4y = (l1up/2-(incl+rh-p1*sin(alfa2)))+(p1+s4x)*sin(alfa2)  // 17mm
  s0x = -0.005[m]
  s0y = -0.005[m]
  durezza = 0.003[mm]  // reed strength
  vn = 0.001[m/s]
  f0ipo = 346.65[m/s]/((LSim)*2)  // approximated tube foundamental frequency
  tipLine = tan((p2/2-p3/2)/(p4-p3/2-p1-rRT*tan(5[deg])))
  Mup = p2*1.1  // Larghezza interna altà cross-section a metà della curva iniziale
  tip100 = 0.8  // percentuale di larghezza del tip nella cross-section (1 se combacia)
  conicity = 1.6[deg]
  r1 = 13*0.5[mm]  // input cone radius
  Ltube = 0.45*0.735[m]  // lunghezza cono
  Ra = r1+tan(conicity)*Ltube  // output cone radius
  LSim = Ltube
  inton = 0.855  // % kiever-mouthpiece joint

Variables
  var1 "Variabili 1"

Probes
  bnd1: Boundary "Himpend" on boundaries 55
    type = maximum
    probename = HP5end
    expr = abs(p5/1000/acpr2.v_inst)
    unit = Pa*s/m
    table = tbl1
  bnd2: Boundary "Hvend" (disabled) on boundaries 55
    type = integral
    probename = Hvinstend
    expr = acpr2.v_inst
    unit = m^3/s
    descr = Velocità acustica totale istantanea
    frame = mesh
    table = default
  bnd3: Boundary "NSPend" (disabled) on boundaries 55
    type = integral
    probename = NSPend
    expr = abs(p)
    unit = N
    frame = mesh
    table = default
  bnd4: Boundary "NSvend" (disabled) on boundaries 55
    type = integral
    probename = NSvend
    expr = lnsf3.v_inst
    unit = m^3/s
    descr = Ampiezza della velocità
    frame = mesh
    table = default
  bnd5: Boundary "NSvsf" (disabled) on no boundaries
    type = integral
    probename = NSvsf
    expr = lnsf3.v_inst
    unit = m^3/s
    descr = Ampiezza della velocità
    table = default
  bnd6: Boundary "NSpsf" (disabled) on no boundaries
    type = integral
    probename = NSPsf
    expr = abs(p)
    unit = N
    frame = mesh
    table = default
  bnd7: Boundary "HIMPin" (disabled) on boundaries 5, 6
    type = maximum
    expr = abs(p5/1000)/(acpr2.v_inst)
    unit = Pa*s/m
    table = default
  bnd8: Boundary "NSIMPend" (disabled) on boundaries 55
    type = integral
    expr = abs(p)/(1+lnsf3.v_inst)
    unit = kg/s
    frame = mesh
    table = default
  bnd9: Boundary "NSIMPsf" (disabled) on no boundaries
    type = integral
    expr = abs(p)/(lnsf3.v_inst+1)
    unit = kg/s
    table = default
  bnd10: Boundary "HPend" on boundaries 55 | type = maximum; expr = abs(p5/1000); unit = Pa; table = tbl2

Geometry
  part6 "Mouthpiecepieno" (3D, length unit m)
    cyl1: Cylinder "Cilindro 3" | axistype = x; r = D/2; h = L
    cyl2: Cylinder "Cilindro 4" (disabled) | pos = {L-l, 0, 0}; axistype = x; r = d/2; h = l
    cone1: Cone "Cono 1" (disabled) | pos = {L-l, 0, 0}; axistype = x; r = d/2; h = l; specifytop = radius; rtop = d/1.9
    dif1: Difference "Differenza 1" (disabled) | input2 = cone1
    wp1: WorkPlane "slit plane normal" | unite = on
      pol1: Polygon "Poligono 1"
        source = table
        table = 
          {0, incl+rh}
          {-0.005, -D}
          {L+d, -D}
          {(L+d)*cos(alfa2), incl+rh-(L+d)*sin(alfa2)}
          {rL*cos(alfa2), -D/2+rh}
    wp2: WorkPlane "slit plane normal 1" (disabled) | unite = on
      ls3: LineSegment "Segmento 3"
        specify1 = coord
        coord1 = {p1*cos(alfa2), incl+rh-p1*sin(alfa2)}
        specify2 = coord
        coord2 = {p1*cos(alfa2), D/1.5}
    wp3: WorkPlane "slit plane normal 1.1" (disabled) | unite = on
      ls1: LineSegment "Segmento 1"
        specify1 = coord
        coord1 = {p1*cos(beta), incl+rh-p1*sin(alfa2)}
        specify2 = coord
        coord2 = {L-l, incl+rh-p1*sin(alfa2)}
    ext1: Extrude "Estrusione 1"
      extrudefrom = faces
      inputface = wp1.pol1 boundaries 1
      inputhandling = remove
      distance = {0.05, -0.05}
      scale = {{1, 1}, {1, 1}}
      baseid = {3, 1, 0, 4, 2}
    dif2: Difference "Differenza 2" | input = cyl1; input2 = ext1
    wp4: WorkPlane "Piano di lavoro 2" | quickplane = xz; unite = on
      pol1: Polygon "Poligono 1"
        source = table
        table = {{L, d/2+0.002}, {rL+0.001, D/2}, {0, DD}, {-0.005, 0.02}, {L+0.005, D/1.5}}
    rev1: Revolve "Ruota 1"
      workplane = wp4
      input = wp4
      inputface = wp2.pol1 boundaries 1
      angtype = full
      axis = {1, 0}
      revaxis = {{0, 1}, {0, 0}}
    dif3: Difference "Differenza 3" | input = dif2; input2 = rev1
    wp5: WorkPlane "plane slit" (disabled) | planetype = vertices; unite = on
      pt1: Point "Punto 1" | p = {0, p1}
      c1: Circle "Cerchio 1" | pos = {0, p4-p3/2}; r = p3/2
      ic1: InterpolationCurve "Curva di interpolazione 1"
        table = {{-rT/2, p1*2}, {0, p1}, {rT/2, p1*2}}
        starttang = {0.0138, -0.00456}
        endtang = {0.0138, 0.00456}
      tan1: Tangent "Tangente 1"
        edge = c1(1) boundaries 3
        type = point
        edge2 = ic1(1) boundaries 1
        point = ic1(1) points 2
      tan2: Tangent "Tangente 2" | edge = c1(1) boundaries 4; type = point; point = ic1(1) points 1
      csol1: ConvertToSolid "Converti in solido 1" | input = c1, ic1, tan1, tan2
      del1: Delete "Elimina entità 1" | input = csol1(1) boundaries 3, 4, 6, 8
    wp6: WorkPlane "plane slit 1" (disabled)
      planetype = coordinates
      genpoints = {{0, incl+rh, 0}, {0, incl+rh, 0.02}, {rL*cos(alfa2), -D/2+rh, 0}}
      unite = on
      pt1: Point "Punto 1" | p = {0, p1}
      c1: Circle "Cerchio 1" | pos = {0, p4-p3/2}; r = p3/2
      ic1: InterpolationCurve "Curva di interpolazione 1"
        table = {{-p2/2, p1*2}, {0, p1}, {p2/2, p1*2}}
        starttang = {0.0142, -0.0064}
        endtang = {0.0142, 0.0064}
      tan1: Tangent "Tangente 1"
        edge = c1(1) boundaries 3
        type = point
        edge2 = ic1(1) boundaries 1
        point = ic1(1) points 2
      tan2: Tangent "Tangente 2" | edge = c1(1) boundaries 4; type = point; point = ic1(1) points 1
      csol1: ConvertToSolid "Converti in solido 1" | input = c1, ic1, tan1, tan2
      del1: Delete "Elimina entità 1" | input = csol1(1) boundaries 3, 4, 6, 8
    wp7: WorkPlane "crossSection1" (disabled) | planetype = faceparallel; offset = d3; reverse = on; unite = on
      cro1: CrossSection "Sezione d'urto 1"
    wp8: WorkPlane "interno profilo" (disabled)
      planetype = coordinates
      genpoints = 
        {p1*cos(alfa2), incl+rh-p1*sin(alfa2), 0}
        {1, incl+rh-p1*sin(alfa2), 0}
        {p1*cos(alfa2), 1, 0}
      unite = on
      ic1: InterpolationCurve "Curva di interpolazione 1"
        table = 
          {0, 0}
          {s1x-p1*cos(alfa2), s1y-(p1+s1x)*sin(alfa2)}
          {s2x-p1*cos(alfa2), s2y-(p1+s2x)*sin(alfa2)}
          {s3x-p1*cos(alfa2), s3y-(p1+s3x)*sin(alfa2)}
          {s4x-p1*cos(alfa2), s4y-(p1+s4x)*sin(alfa2)}
          {L-l-p1*cos(alfa2), d/2-(incl+rh-p1*sin(alfa2))}
        starttang = {0.0394605020287, 0.0173798656673}
        endtang = {0.0438165187017, 0.00242531001432}
    wp9: WorkPlane "interno profilo 1" (disabled)
      planetype = coordinates
      genpoints = 
        {p1*cos(alfa2), incl+rh-p1*sin(alfa2), 0}
        {1, incl+rh-p1*sin(alfa2), 0}
        {p1*cos(alfa2), 1, 0}
      unite = on
      pol1: Polygon "Poligono 1"
        type = open
        source = table
        table = 
          {0, 0}
          {s1x-p1*cos(alfa2), s1y-(p1+s1x)*sin(alfa2)}
          {s2x-p1*cos(alfa2), s2y-(p1+s2x)*sin(alfa2)}
          {s3x-p1*cos(alfa2), s3y-(p1+s3x)*sin(alfa2)}
          {s4x-p1*cos(alfa2), s4y-(p1+s4x)*sin(alfa2)}
          {L-l-p1*cos(alfa2), d/2-(incl+rh-p1*sin(alfa2))}
    wp10: WorkPlane "CSProva" (disabled) | planetype = vertices; unite = on
      pol1: Polygon "Poligono 1"
        source = table
        table = {{ddown, -l1down/2}, {ddown, l1down/2}, {h1, l1up/2}, {h1, -l1up/2}}
      fil1: Fillet "Raccordo 1" | point = pol1(1) points 1, 2; radius = r1down
      fil2: Fillet "Raccordo 2" | point = fil1(1) points 5, 6; radius = r1up
    wp11: WorkPlane "CS2" (disabled)
      planetype = coordinates
      offset = s2x
      reverse = on
      genpoints = {{s2x, incl+rh+s2y-s2x*sin(alfa2), 0}, {s2x, incl+rh+s2y-s2x*sin(alfa2), D}, {s2x, 0, 0}}
      origin = vertexproj
      unite = on
      ls1: LineSegment "Segmento 1"
        specify1 = coord
        coord1 = {-((p4-p3/2)-(s2x-p1))*(p2/2-p3/2)/(p4-p3/2)-p3/2+p3/50, -s2y}
        specify2 = coord
        coord2 = {-0.25*(p2+l1up), 0}
      ls2: LineSegment "Segmento 2"
        specify1 = coord
        coord1 = {+((p4-p3/2)-(s2x-p1))*(p2/2-p3/2)/(p4-p3/2)+p3/2-p3/50, -s2y}
        specify2 = coord
        coord2 = {0.25*(p2+l1up), 0}
      ls3: LineSegment "Segmento 3"
        vertex1 = ls1(1) points 2
        vertex2 = ls2(1) points 2
        coord2 = {0.25*(rT+l1up), -s3y}
      ls4: LineSegment "Segmento 4"
        vertex1 = ls1(1) points 1
        vertex2 = ls2(1) points 1
        coord2 = {0.25*(rT+l1up), -s3y}
      csol1: ConvertToSolid "Converti in solido 1" | input = ls1, ls2, ls3, ls4
      fil1: Fillet "Raccordo 1" | point = csol1(1) points 1-4; radius = r1up
    wp12: WorkPlane "CS1" (disabled)
      planetype = coordinates
      offset = s1x
      reverse = on
      genpoints = {{s1x, incl+rh+s1y-s1x*sin(alfa2), 0}, {s1x, incl+rh+s1y-s1x*sin(alfa2), D}, {s1x, 0, 0}}
      origin = vertexproj
      unite = on
      ls1: LineSegment "Segmento 1"
        specify1 = coord
        coord1 = {-((p4-p3/2)-(s1x-p1))*(p2/2-p3/2)/(p4-p3/2)-p3/2+p3/50, -s1y}
        specify2 = coord
        coord2 = {-((p4-p3/2)-(s1x-p1))*(p2/2-p3/2)/(p4-p3/2)-p3/2, 0}
      ls2: LineSegment "Segmento 2"
        specify1 = coord
        coord1 = {+((p4-p3/2)-(s1x-p1))*(p2/2-p3/2)/(p4-p3/2)+p3/2-p3/50, -s1y}
        specify2 = coord
        coord2 = {+((p4-p3/2)-(s1x-p1))*(p2/2-p3/2)/(p4-p3/2)+p3/2, 0}
      ls3: LineSegment "Segmento 3"
        vertex1 = ls1(1) points 2
        vertex2 = ls2(1) points 2
        coord2 = {0.25*(rT+l1up), -s3y}
      ls4: LineSegment "Segmento 4"
        vertex1 = ls1(1) points 1
        vertex2 = ls2(1) points 1
        coord2 = {0.25*(rT+l1up), -s3y}
      csol1: ConvertToSolid "Converti in solido 1" | input = ls1, ls2, ls3, ls4
      fil1: Fillet "Raccordo 1" | point = csol1(1) points 1-4; radius = r1up
    wp13: WorkPlane "CS3" (disabled)
      planetype = coordinates
      offset = s3x
      reverse = on
      genpoints = {{s3x, incl+rh+s3y-s3x*sin(alfa2), 0}, {s3x, incl+rh+s3y-s3x*sin(alfa2), D}, {s3x, 0, 0}}
      origin = vertexproj
      unite = on
      ls1: LineSegment "Segmento 1"
        specify1 = coord
        coord1 = {-((p4-p3/2)-(s3x-p1))*(rT/2-p3/2)/(p4-p3/2)-p3/2+p3/10, s3y}
        specify2 = coord
        coord2 = {-0.25*(rT+l1up), 0}
      ls2: LineSegment "Segmento 2"
        specify1 = coord
        coord1 = {+((p4-p3/2)-(s3x-p1))*(rT/2-p3/2)/(p4-p3/2)+p3/2-p3/10, s3y}
        specify2 = coord
        coord2 = {0.25*(rT+l1up), 0}
      ls3: LineSegment "Segmento 3"
        vertex1 = ls1(1) points 2
        vertex2 = ls2(1) points 2
        coord2 = {0.25*(rT+l1up), -s3y}
      ls4: LineSegment "Segmento 4"
        vertex1 = ls1(1) points 1
        vertex2 = ls2(1) points 1
        coord2 = {0.25*(rT+l1up), -s3y}
      csol1: ConvertToSolid "Converti in solido 1" | input = ls1, ls2, ls3, ls4
      fil1: Fillet "Raccordo 1" | point = csol1(1) points 1-4; radius = r1up
    wp14: WorkPlane "CS4" (disabled)
      planetype = coordinates
      offset = s4x
      reverse = on
      genpoints = {{s4x, incl+rh+s4y-s4x*sin(alfa2), 0}, {s4x, incl+rh+s4y-s4x*sin(alfa2), D}, {s4x, 0, 0}}
      unite = on
      cro1: CrossSection "Sezione d'urto 1"
    wp15: WorkPlane "CS40" (disabled)
      planetype = coordinates
      genpoints = {{s4x, incl+rh+s4y-s4x*sin(alfa2), 0}, {s4x, 1, 0}, {s4x, incl+rh+s4y-s4x*sin(alfa2), D}}
      unite = on
      pol2: Polygon "Poligono 2" | source = table; table = {{-h1, -l1down/2}, {-h1, l1down/2}, {0, l1up/2}, {0, -l1up/2}}
      fil3: Fillet "Raccordo 3" | point = pol2(1) points 1, 2; radius = r1down
      fil4: Fillet "Raccordo 4" | point = fil3(1) points 5, 6; radius = r1up
    wp16: WorkPlane "CS6" (disabled) | planetype = faceparallel; face = dif3(1) boundaries 8; unite = on
      c1: Circle "Cerchio 1" | r = d/2
    wp17: WorkPlane "Piano di lavoro 14" (disabled)
      planetype = coordinates
      offsettype = vertex
      genpoints = 
        {p1*cos(alfa2), incl+rh-p1*sin(alfa2), 0}
        {p1*cos(alfa2), (incl+rh-p1*sin(alfa2)), rT}
        {p1*cos(alfa2)-p2*sin(-normalT/2), (incl+rh-p1*sin(alfa2))-p2*cos(normalT), 0}
      transdispl = {0, p1, 0}
      transaxistype = x
      transrot = -normalT
      transeulerang = {0, -normalT, 0}
      rot = 15
      origin = vertexproj
      unite = on
      pol1: Polygon "Poligono 1"
        type = open
        source = table
        table = {{p2/2, p1}, {p2/2, p2/3}, {-p2/2, p2/3}, {-p2/2, p1}}
      ic1: InterpolationCurve "Curva di interpolazione 1"
        table = {{p2/2, p1}, {0, 0}, {-p2/2, p1}}
        starttang = {-0.0142, -0.0064}
        endtang = {-0.0142, 0.0064}
      csol1: ConvertToSolid "Converti in solido 1" | input = ic1, pol1
    loft1: Loft (disabled) | profile = wp12; endprofile = dif3(1) boundaries 8; crossfaces = on
    wp18: WorkPlane "CS40.1" (disabled)
      planetype = coordinates
      genpoints = {{s4x, incl+rh+s4y-s4x*sin(alfa2), 0}, {s4x, 1, 0}, {s4x, incl+rh+s4y-s4x*sin(alfa2), D}}
      unite = on
      pol2: Polygon "Poligono 2" | source = table; table = {{-h1, -l1down/2}, {-h1, l1down/2}, {0, l1up/2}, {0, -l1up/2}}
      fil3: Fillet "Raccordo 3" | point = pol2(1) points 1, 2; radius = r1down
      fil4: Fillet "Raccordo 4" | point = fil3(1) points 5, 6; radius = r1up
    loft2: Loft (disabled) | profile = wp14, wp9; crossfaces = on
    rev2: Revolve "Ruota 2" (disabled)
      workplane = wp18
      inputhandling = keep
      angle1 = -1
      angle2 = (90-normalT)/10
      pos = {p1, p1}
      axis = {1, 0}
      revaxis = {{p1, 1}, {p1, 0}}
    wp19: WorkPlane "Piano di lavoro 16"
      planetype = coordinates
      genpoints = 
        {p1*cos(alfa2), incl+rh-p1*sin(alfa2), 0}
        {p2*cos(alfa2), incl+rh-p2*sin(alfa2), 0}
        {0, 1, 0}
      unite = on
      pol1: Polygon "Poligono 1"
        source = table
        table = {{-(p5)*cos(gamma*0.5), (2*p5)*sin(gamma*0.5)}, {p5, 0}, {p5, -d/2}, {0, -d/2}}
    ext2: Extrude "Estrusione 2"
      workplane = wp19
      input = wp19
      inputhandling = keep
      distance = {D/2, -D/2}
      scale = {{1, 1}, {1, 1}}
      baseid = {3, 1, 2}
    dif4: Difference "Differenza 4" | input = dif3; input2 = ext2, loft1, loft2, rev2; intbnd = off; face = all
    dif5: Difference "Differenza 6" (disabled)
    wp20: WorkPlane "esterno profilo 2"
      planetype = coordinates
      genpoints = 
        {p1*cos(alfa2), incl+rh-p1*sin(alfa2), 0}
        {1, incl+rh-p1*sin(alfa2), 0}
        {p1*cos(alfa2), 1, 0}
      unite = on
      ic1: InterpolationCurve "Curva di interpolazione 1"
        table = {{0, 0+0.003}, {L-l-p1*cos(alfa2), d/2-(incl+rh-p1*sin(alfa2))+0.01}}
        starttang = {0.0436421927444, 0.0223763885711}
        endtang = {0.0436421927444, 0.0223763885711}
      ls1: LineSegment "Segmento 1" | vertex1 = ic1(1) points 2; specify2 = coord; coord2 = {L-l, D}
      ls2: LineSegment "Segmento 2" | vertex1 = ic1(1) points 1; specify2 = coord; coord2 = {-p1, p1}
      ls3: LineSegment "Segmento 3" | vertex1 = ls2(1) points 2; specify2 = coord; coord2 = {-3*p1, D}
      ls4: LineSegment "Segmento 4" | vertex1 = ls3(1) points 2; vertex2 = ls1(1) points 2; coord2 = {-3*p1, D}
      csol1: ConvertToSolid "Converti in solido 1" | input = ic1, ls1, ls2, ls3, ls4
    rev3: Revolve "Ruota 3"
      workplane = wp20
      input = wp20
      inputhandling = keep
      angtype = full
      pos = {L, -4*DD}
      axis = {-cos(beta), sin(beta)}
      revaxis = {{L, -cos(beta)}, {-4*DD, sin(beta)}}
    dif6: Difference "Differenza 5" | input = dif4; input2 = rev3; intbnd = off; face = all
    pi1: PartInstance "reed 1" (disabled) | part = part2; lengthunit = m
    sph1: Sphere "Sfera 1" (disabled) | pos = {-p5, incl+rh, 0}; r = p5*2
    del1: Delete "Elimina entità 1" | input = wp19, wp20
    dsl1: DeleteSliverFaces "Elimina facce sottili 1" (disabled) | input = dif6
    wp21: WorkPlane "Piano di lavoro 25" | originvertex = dsl1(1) points 3; origin = vertexproj; unite = on
      r1: Rectangle "Rettangolo 1" | pos = {-2*p1, incl}; size = {3*p1, 5*p1}
    rev4: Revolve "Ruota 4"
      workplane = wp21
      input = wp21
      angle1 = -50
      angle2 = 50
      pos = {rT, 0}
      revaxis = {{rT, 0}, {0, 1}}
    dif7: Difference "Differenza 7" | input = dif6; input2 = rev4
    fil1: Fillet3D "Raccordo 1" (disabled) | radius = 2*p1; yshaped = on
  part2 "reed" (3D, length unit m)
    wp1: WorkPlane "slit plane normal" | displ = {p1, 0}; unite = on
      pol1: Polygon "Poligono 1"
        source = table
        table = 
          {0, incl+rh}
          {0, incl+rh-durezza}
          {p4*1.2*cos(alfa2), incl+rh-(p4*1.2)*sin(alfa2)-rh}
          {rL, incl-(rL)*sin(alfa2)}
          {(rL)+rh*sin(alfa2), incl+rh-(rL)*sin(alfa2)}
    ext1: Extrude "Estrusione 1"
      workplane = wp1
      input = wp1
      distance = {rT/2+p1, -rT/2-p1}
      scale = {{1, 1}, {1, 1}}
      displ = {{0, 0}, {0, 0}}
      twist = {0, 0}
      baseid = {3, 1, 0, 4, 2}
    wp2: WorkPlane "Piano di lavoro 2"
      planetype = vertices
      quickplane = yz
      vertex1 = ext1(1) points 11
      vertex2 = ext1(1) points 10
      vertex3 = ext1(1) points 14
      unite = on
      ic1: InterpolationCurve "Curva di interpolazione 1"
        table = {{-rT/2-p1, rh/2}, {0, 0}, {rT/2+p1, rh/2}}
        starttang = {0.0208, -0.0058}
        endtang = {0.0208, 0.0058}
      pol1: Polygon "Poligono 1"
        type = open
        source = table
        table = {{-rT/2-p1, rh/2}, {-rT/2-p1, rh}, {rT/2+p1, rh}, {rT/2+p1, rh/2}}
      csol1: ConvertToSolid "Converti in solido 1" | input = ic1, pol1
    ext2: Extrude "Estrusione 2" | workplane = wp2; input = wp2; inputhandling = keep; distance = -rL
    int1: Intersection "Intersezione 1" | input = ext1, ext2
    wp3: WorkPlane "plane slit 1"
      planetype = coordinates
      genpoints = {{p1, incl+rh, 0}, {p1, incl+rh, 0.02}, {rL*cos(alfa2), -D/2+rh, 0}}
      unite = on
      ic1: InterpolationCurve "Curva di interpolazione 1"
        table = {{-rT/2-p1, p1}, {0, 0}, {rT/2+p1, p1}}
        starttang = {0.0208, -0.0064}
        endtang = {0.0208, 0.0064}
      pol1: Polygon "Poligono 1"
        type = open
        source = table
        table = {{-rT/2-p1, p1}, {-rT/2, rL*1.1}, {rT/2, rL*1.1}, {rT/2+p1, p1}}
      csol1: ConvertToSolid "Converti in solido 1" | input = ic1, pol1
    ext3: Extrude "Estrusione 3" | workplane = wp3; input = wp3; distance = -rh*1.1
    int2: Intersection "Intersezione 2" | input = ext3, int1
    del1: Delete "Elimina entità 1" | input = wp2
  geom4 "Geometria 4" (3D, length unit m)
    cone1: Cone "Cono 1" | pos = {L-l, 0, 0}; axistype = x; r = d/2; h = l*(1-inton); specifytop = radius; rtop = d/2
    wp6: WorkPlane "plane slit 1"
      planetype = coordinates
      genpoints = {{0, incl+rh, 0}, {0, incl+rh, 0.02}, {rL*cos(alfa2), -D/2+rh, 0}}
      unite = on
      pt1: Point "Punto 1" | p = {0, p1}
      c1: Circle "Cerchio 1" | pos = {0, p4-p3/2}; r = p3/2
      ic1: InterpolationCurve "Curva di interpolazione 1"
        table = {{-p2/2, p1+rRT*tan(5[deg])}, {0, p1}, {p2/2, p1+rRT*tan(5[deg])}}
        starttang = {0.0142, -0.00419945584924}
        endtang = {0.0142, 0.00419945584924}
      tan1: Tangent "Tangente 1"
        edge = c1(1) boundaries 3
        type = point
        edge2 = ic1(1) boundaries 1
        point = ic1(1) points 2
      tan2: Tangent "Tangente 2" | edge = c1(1) boundaries 4; type = point; point = ic1(1) points 1
      csol1: ConvertToSolid "Converti in solido 1" | input = c1, ic1, tan1, tan2
      del1: Delete "Elimina entità 1" | input = csol1(1) boundaries 3, 4, 6, 8
    wp9: WorkPlane "interno profilo 1"
      planetype = coordinates
      genpoints = 
        {p1*cos(alfa2), incl+rh-p1*sin(alfa2), 0}
        {1, incl+rh-p1*sin(alfa2), 0}
        {p1*cos(alfa2), 1, 0}
      unite = on
      pol1: Polygon "Poligono 1"
        type = open
        source = table
        table = 
          {-p1*cos(gamma), (p5+p1)*sin(gamma)-(p1)*sin(alfa2)}
          {0, p5*sin(gamma)-(p1)*sin(alfa2)}
          {s1x-p1*cos(alfa2), s1y-(p1+s1x)*sin(alfa2)}
          {s2x-p1*cos(alfa2), s2y-(p1+s2x)*sin(alfa2)}
          {s3x-p1*cos(alfa2), s3y-(p1+s3x)*sin(alfa2)}
          {s4x-p1*cos(alfa2), s4y-(p1+s4x)*sin(alfa2)}
          {L-l-p1*cos(alfa2), d/2-(incl+rh-p1*sin(alfa2))}
    wp24: WorkPlane "Piano di lavoro 24"
      quickplane = yz
      quickorigin = vertexproj
      originvertex = wp9.pol1 points 1
      unite = on
      r1: Rectangle "Rettangolo 1" | pos = {-p5*sin(gamma)/2, 0}; base = center; size = {p5*sin(gamma), p2}
      fil1: Fillet "Raccordo 1" | point = r1(1) points 2, 3; radius = 0.1[mm]
    wp28: WorkPlane "Piano di lavoro 28"
      quickplane = yz
      quickoffsettype = vertex
      offsetvertex = wp9.pol1 points 2
      quickorigin = vertexproj
      originvertex = wp9.pol1 points 2
      unite = on
      r1: Rectangle "Rettangolo 1" | pos = {-p5*sin(gamma)/2, 0}; base = center; size = {p5*sin(gamma), p2}
      fil1: Fillet "Raccordo 1" | point = r1(1) points 2, 3; radius = 0.1[mm]
    wp12: WorkPlane "CS1"
      planetype = coordinates
      offset = s1x
      reverse = on
      genpoints = 
        {s1x, incl+rh+s1y-(s1x)*sin(alfa2), 0}
        {s1x, incl+rh+s1y-(p1+s1x)*sin(alfa2), D}
        {s1x, D, 0}
      origin = vertexproj
      unite = on
      ls1: LineSegment "Segmento 1"
        specify1 = coord
        coord1 = {(-p3/2-tipLine*(p4-p3/2-s1x))*tip100, -s1y}
        specify2 = coord
        coord2 = {0.5*(-Mup/2-p3/2-tipLine*(p4-p3/2-s1x)), 0}
      ls2: LineSegment "Segmento 2"
        specify1 = coord
        coord1 = {(+p3/2+tipLine*(p4-p3/2-s1x))*tip100, -s1y}
        specify2 = coord
        coord2 = {-0.5*(-Mup/2-p3/2-tipLine*(p4-p3/2-s1x)), 0}
      ls3: LineSegment "Segmento 3"
        vertex1 = ls1(1) points 2
        vertex2 = ls2(1) points 2
        coord2 = {0.25*(rT+l1up), -s3y}
      ls4: LineSegment "Segmento 4"
        vertex1 = ls1(1) points 1
        vertex2 = ls2(1) points 1
        coord2 = {0.25*(rT+l1up), -s3y}
      csol1: ConvertToSolid "Converti in solido 1" | input = ls1, ls2, ls3, ls4
      fil1: Fillet "Raccordo 1" | point = csol1(1) points 1, 4; radius = r1up/5
    loft3: Loft | profile = wp12, wp24, wp28; facepartitioning = grid; errorcoord = on
    wp30: WorkPlane "CS1.1"
      planetype = coordinates
      offset = s1x
      reverse = on
      genpoints = {{s1x, incl+rh+s1y-s1x*sin(alfa2), 0}, {s1x, incl+rh+s1y-s1x*sin(alfa2), D}, {s1x, D, 0}}
      origin = vertexproj
      unite = on
      ls1: LineSegment "Segmento 1"
        specify1 = coord
        coord1 = {(-p3/2-tipLine*(p4-p3/2-s1x))*tip100, -s1y}
        specify2 = coord
        coord2 = {0.5*(-Mup/2-p3/2-tipLine*(p4-p3/2-s1x)), 0}
      ls2: LineSegment "Segmento 2"
        specify1 = coord
        coord1 = {(+p3/2+tipLine*(p4-p3/2-s1x))*tip100, -s1y}
        specify2 = coord
        coord2 = {-0.5*(-Mup/2-p3/2-tipLine*(p4-p3/2-s1x)), 0}
      ls3: LineSegment "Segmento 3"
        vertex1 = ls1(1) points 2
        vertex2 = ls2(1) points 2
        coord2 = {0.25*(rT+l1up), -s3y}
      ls4: LineSegment "Segmento 4"
        vertex1 = ls1(1) points 1
        vertex2 = ls2(1) points 1
        coord2 = {0.25*(rT+l1up), -s3y}
      csol1: ConvertToSolid "Converti in solido 1" | input = ls1, ls2, ls3, ls4
      fil1: Fillet "Raccordo 1" | point = csol1(1) points 1, 4; radius = r1up/5
    wp11: WorkPlane "CS2"
      planetype = coordinates
      offset = s2x
      reverse = on
      genpoints = {{s2x, incl+rh+s2y-s2x*sin(alfa2), 0}, {s2x, incl+rh+s2y-s2x*sin(alfa2), D}, {s2x, D, 0}}
      origin = vertexproj
      unite = on
      workplane3d = off
      ls1: LineSegment "Segmento 1"
        specify1 = coord
        coord1 = {(-p3/2-tipLine*(p4-p3/2-s2x))*tip100, -s2y}
        specify2 = coord
        coord2 = {-Mup/2, 0}
      ls2: LineSegment "Segmento 2"
        specify1 = coord
        coord1 = {(-(-p3/2-tipLine*(p4-p3/2-s2x)))*tip100, -s2y}
        specify2 = coord
        coord2 = {Mup/2, 0}
      ls3: LineSegment "Segmento 3"
        vertex1 = ls1(1) points 2
        vertex2 = ls2(1) points 2
        coord2 = {0.25*(rT+l1up), -s3y}
      ls4: LineSegment "Segmento 4"
        vertex1 = ls1(1) points 1
        vertex2 = ls2(1) points 1
        coord2 = {0.25*(rT+l1up), -s3y}
      csol1: ConvertToSolid "Converti in solido 1" | input = ls1, ls2, ls3, ls4
      fil1: Fillet "Raccordo 1" | point = csol1(1) points 1, 4; radius = r1up/2
    loft4: Loft | startprofile = wp30; endprofile = wp11.fil1 boundaries 1; facepartitioning = grid; errorcoord = on
    uni3: Union "Unione 3" | input = loft3, loft4; intbnd = off; face = all
    wp33: WorkPlane "CS2.2"
      planetype = coordinates
      offset = s2x
      reverse = on
      genpoints = 
        {s2x*cos(alfa2*2-6[deg]), incl+rh+s2y-s2x*sin(alfa2), 0}
        {s2x*cos(alfa2*2-6[deg]), incl+rh+s2y-s2x*sin(alfa2), D}
        {s2x*cos(alfa2*2-6[deg]), D, 0}
      origin = vertexproj
      unite = on
      workplane3d = off
      ls1: LineSegment "Segmento 1"
        specify1 = coord
        coord1 = {(-p3/2-tipLine*(p4-p3/2-s2x))*tip100, -s2y}
        specify2 = coord
        coord2 = {-Mup/2, 0}
      ls2: LineSegment "Segmento 2"
        specify1 = coord
        coord1 = {(-(-p3/2-tipLine*(p4-p3/2-s2x)))*tip100, -s2y}
        specify2 = coord
        coord2 = {Mup/2, 0}
      ls3: LineSegment "Segmento 3"
        vertex1 = ls1(1) points 2
        vertex2 = ls2(1) points 2
        coord2 = {0.25*(rT+l1up), -s3y}
      ls4: LineSegment "Segmento 4"
        vertex1 = ls1(1) points 1
        vertex2 = ls2(1) points 1
        coord2 = {0.25*(rT+l1up), -s3y}
      csol1: ConvertToSolid "Converti in solido 1" | input = ls1, ls2, ls3, ls4
      fil1: Fillet "Raccordo 1" | point = csol1(1) points 1, 4; radius = r1up/2
    wp31: WorkPlane "CS2.1" (disabled)
      planetype = coordinates
      offset = s2x
      reverse = on
      genpoints = {{s2x, incl+rh+s2y-s2x*sin(alfa2), 0}, {s2x, incl+rh+s2y-s2x*sin(alfa2), D}, {s2x, D, 0}}
      origin = vertexproj
      unite = on
      workplane3d = off
      ls1: LineSegment "Segmento 1"
        specify1 = coord
        coord1 = {(-p3/2-tipLine*(p4-p3/2-s2x))*tip100, -s2y}
        specify2 = coord
        coord2 = {-Mup/2, 0}
      ls2: LineSegment "Segmento 2"
        specify1 = coord
        coord1 = {tip100*(-(-p3/2-tipLine*(p4-p3/2-s2x))), -s2y}
        specify2 = coord
        coord2 = {Mup/2, 0}
      ls3: LineSegment "Segmento 3"
        vertex1 = ls1(1) points 2
        vertex2 = ls2(1) points 2
        coord2 = {0.25*(rT+l1up), -s3y}
      ls4: LineSegment "Segmento 4"
        vertex1 = ls1(1) points 1
        vertex2 = ls2(1) points 1
        coord2 = {0.25*(rT+l1up), -s3y}
      csol1: ConvertToSolid "Converti in solido 1" | input = ls1, ls2, ls3, ls4
      fil1: Fillet "Raccordo 1" | point = csol1(1) points 1, 4; radius = r1up/2
    wp13: WorkPlane "CS3"
      planetype = coordinates
      offset = s3x
      reverse = on
      genpoints = {{s3x, incl+rh+s3y-s3x*sin(alfa2), 0}, {s3x, (incl+rh+s3y-s3x*sin(alfa2)), -D}, {s3x, -D, 0}}
      origin = vertexproj
      unite = on
      ls1: LineSegment "Segmento 1"
        specify1 = coord
        coord1 = {(-p3/2-tipLine*(p4-p3/2-s3x))*tip100, s3y}
        specify2 = coord
        coord2 = {-Mup/2, 0}
      ls2: LineSegment "Segmento 2"
        specify1 = coord
        coord1 = {(-(-p3/2-tipLine*(p4-p3/2-s3x)))*tip100, s3y}
        specify2 = coord
        coord2 = {Mup/2, 0}
      ls3: LineSegment "Segmento 3"
        vertex1 = ls1(1) points 2
        vertex2 = ls2(1) points 2
        coord2 = {0.25*(rT+l1up), -s3y}
      ls4: LineSegment "Segmento 4"
        vertex1 = ls1(1) points 1
        vertex2 = ls2(1) points 1
        coord2 = {0.25*(rT+l1up), -s3y}
      csol1: ConvertToSolid "Converti in solido 1" | input = ls1, ls2, ls3, ls4
      fil1: Fillet "Raccordo 1" | point = csol1(1) points 1, 4; radius = r1up/2
    loft5: Loft | startprofile = wp33; endprofile = wp13; facepartitioning = grid
    uni4: Union "Unione 4" | input = loft5, uni3; intbnd = off; face = all
    wp25: WorkPlane "CS3.1"
      planetype = coordinates
      offset = s3x
      reverse = on
      genpoints = {{s3x, incl+rh+s3y-s3x*sin(alfa2), 0}, {s3x, incl+rh+s3y-s3x*sin(alfa2), D}, {s3x, -D, 0}}
      origin = vertexproj
      unite = on
      ls1: LineSegment "Segmento 1"
        specify1 = coord
        coord1 = {(-p3/2-tipLine*(p4-p3/2-s3x))*tip100, s3y}
        specify2 = coord
        coord2 = {-Mup/2, 0}
      ls2: LineSegment "Segmento 2"
        specify1 = coord
        coord1 = {-(-p3/2-tipLine*(p4-p3/2-s3x))*tip100, s3y}
        specify2 = coord
        coord2 = {Mup/2, 0}
      ls3: LineSegment "Segmento 3"
        vertex1 = ls1(1) points 2
        vertex2 = ls2(1) points 2
        coord2 = {0.25*(rT+l1up), -s3y}
      ls4: LineSegment "Segmento 4"
        vertex1 = ls1(1) points 1
        vertex2 = ls2(1) points 1
        coord2 = {0.25*(rT+l1up), -s3y}
      csol1: ConvertToSolid "Converti in solido 1" | input = ls1, ls2, ls3, ls4
      fil1: Fillet "Raccordo 1" | point = csol1(1) points 1, 4; radius = r1up/2
    wp15: WorkPlane "CS40"
      planetype = coordinates
      genpoints = {{s4x, incl+rh+s4y-s4x*sin(alfa2), 0}, {s4x, 1, 0}, {s4x, incl+rh+s4y-s4x*sin(alfa2), D}}
      unite = on
      pol2: Polygon "Poligono 2" | source = table; table = {{-h1, -l1down/2}, {-h1, l1down/2}, {0, l1up/2}, {0, -l1up/2}}
      fil3: Fillet "Raccordo 3" | point = pol2(1) points 1, 2; radius = r1down
      fil4: Fillet "Raccordo 4" | point = fil3(1) points 4, 5; radius = r1up
    loft7: Loft | profile = wp15, wp25; unite = off; facepartitioning = grid
    uni5: Union "Unione 5" | input = loft7, uni4; intbnd = off; face = all
    wp18: WorkPlane "CS40.1"
      planetype = coordinates
      genpoints = {{s4x, incl+rh+s4y-s4x*sin(alfa2), 0}, {s4x, 1, 0}, {s4x, incl+rh+s4y-s4x*sin(alfa2), D}}
      unite = on
      pol2: Polygon "Poligono 2" | source = table; table = {{-h1, -l1down/2}, {-h1, l1down/2}, {0, l1up/2}, {0, -l1up/2}}
      fil3: Fillet "Raccordo 3" | point = pol2(1) points 1, 2; radius = r1down
      fil4: Fillet "Raccordo 4" | point = fil3(1) points 4, 5; radius = r1up
    wp16: WorkPlane "CS6" | planetype = faceparallel; face = cone1(1) boundaries 3; unite = on
      c1: Circle "Cerchio 1" | r = d/2
    loft8: Loft | profile = wp16, wp18; unite = off; facepartitioning = grid
    wp29: WorkPlane "Piano di lavoro 29" (disabled)
      quickplane = yz
      quickoffsettype = vertex
      offsetvertex = wp9.pol1 points 2
      quickorigin = vertexproj
      originvertex = wp9.pol1 points 2
      unite = on
      r1: Rectangle "Rettangolo 1" | pos = {-p5*sin(gamma)/2, 0}; base = center; size = {p5*sin(gamma), p2}
    loft6: Loft (disabled) | profile = , wp29
    uni6: Union "Unione 6" | input = loft8, uni5; intbnd = off; face = all
    wp26: WorkPlane "CS40.2" (disabled)
      planetype = coordinates
      genpoints = {{s4x, incl+rh+s4y-s4x*sin(alfa2), 0}, {s4x, 1, 0}, {s4x, incl+rh+s4y-s4x*sin(alfa2), D}}
      unite = on
      pol2: Polygon "Poligono 2" | source = table; table = {{-h1, -l1down/2}, {-h1, l1down/2}, {0, l1up/2}, {0, -l1up/2}}
      fil3: Fillet "Raccordo 3" | point = pol2(1) points 1, 2; radius = r1down
      fil4: Fillet "Raccordo 4" | point = fil3(1) points 4, 5; radius = r1up
    uni7: Union "Unione 7" | input = cone1, uni6; intbnd = off; face = all
    rev2: Revolve "Ruota 2"
      workplane = wp6
      input = wp6
      inputhandling = keep
      angle1 = 15
      angle2 = -0.5
      pos = {p1, p1}
      axis = {1, 0}
      revaxis = {{p1, 1}, {p1, 0}}
    uni1: Union "Unione 1" | input = rev2, uni7; intbnd = off; face = all
    uni9: Union "Unione 9" (disabled) | input = , ; keep = on; intbnd = off; face = all
    dif6: Difference "Differenza 6" (disabled) | input = uni7; input2 = rev2
    del4: Delete "Elimina entità 4" (disabled) | input = uni3
    wp27: WorkPlane "Piano di lavoro 25" | origin = vertexproj; unite = on
      r1: Rectangle "Rettangolo 1" | pos = {-2*p1, incl}; size = {3*p1, 5*p1}
    rev3: Revolve "Ruota 4"
      workplane = wp27
      input = wp27
      angle1 = -50
      angle2 = 50
      pos = {2*p1+rT, 0}
      revaxis = {{2*p1+rT, 0}, {0, 1}}
    dif4: Difference "Differenza 4" | input = uni1; input2 = rev3; intbnd = off; face = all
    del2: Delete "Elimina entità 2" | input = wp6, wp9
    wp32: WorkPlane "plane slit 1.1"
      planetype = coordinates
      genpoints = {{0, incl+rh, 0}, {0, incl+rh, 0.02}, {rL*cos(alfa2), -D/2+rh, 0}}
      unite = on
      r1: Rectangle "Rettangolo 1" | pos = {-p2/2*1.5, -p2}; rot = 25; size = {p2*0.8, p4}
      mir1: Mirror "Riflessione 1" | input = r1; keep = on; axis = {1, 0}
    ext1: Extrude "Estrusione 1"
      workplane = wp32
      input = wp32
      inputhandling = keep
      distance = {D, -d}
      scale = {{1, 1}, {1, 1}}
      displ = {{0, 0}, {0, 0}}
      twist = {0, 0}
      baseid = {3, 1, 0, 4, 2}
    dif5: Difference "Differenza 5" | input = dif4; input2 = ext1; intbnd = off; face = all
    del3: Delete "Elimina entità 3" | input = wp32
    cone2: Cone "Cono 2"
      pos = {L-l*inton, 0, 0}
      axistype = x
      r = r1
      h = Ltube
      specifytop = radius
      ang = conicity
      rtop = Ra
    sph1: Sphere "Sfera 1" | pos = {L+Ltube-l*inton+Ra, 0, 0}; r = 2*Ra
    uni2: Union "Unione 2" | input = cone2, dif5; intbnd = off; face = all
    uni8: Union "Unione 8" | input = sph1, uni2
    pt1: Point "Punto 1" (disabled) | p = {Lp-L+l*0.85+0.05, , }
    cone3: Cone "Cono 3" | pos = {Ltube+L-inton*l, 0, 0}; axistype = x; r = Ra; h = Ra*0.6; specifytop = radius; rtop = 0
    fin: Finalize "Forma l'unione"
    ige1: IgnoreEdges "Ignora lati 1" (disabled) | input = fin 38, 39
    rmd1: RemoveDetails "Rimuovere i dettagli 1"
      detailsizetype = relative
      maxrelsize = 0.0005
      maxabssize = 0.000215287661363
      contangletol = 2.5
      infotype = result
      removeddetails = 
        {Ignored_vertices, 15}
        {Ignored_edges, 5}
        {Collapsed_edges, 4}
        {Collapsed_faces, 9}
        {Collapsed_face_regions, 7}
      input = fin 1
      aclf1: CollapseFaces "Collassa facce 1"
        input = fin(1) boundaries 12, 20, 22, 26, 27
        collvtxtol = manual
        maxfaceperimeter = 4.30575e-05
      acfr1: CollapseFaceRegions "Collassa le regioni della faccia 1"
        input = aclf1(1) boundaries 11
        narrowtol = manual
        maxwidth = 2.15288e-05
      aigv1: IgnoreVertices "Ignora vertici 1" | input = acfr1(1) points 34
      acle1: CollapseEdges "Collassa lati 1" | input = aigv1(1) edges 48, 52
      aigv2: IgnoreVertices "Ignora vertici 2" | input = acle1(1) points 32, 34
      aclf2: CollapseFaces "Collassa facce 2"
        input = aigv2(1) boundaries 7, 11, 24, 25
        collvtxtol = manual
        maxfaceperimeter = 0.000129173
      aige1: IgnoreEdges "Ignora lati 1" | input = aclf2(1) edges 11
      aigv3: IgnoreVertices "Ignora vertici 3" | input = aige1(1) points 18
      aigv4: IgnoreVertices "Ignora vertici 4" | input = aigv3(1) points 5, 20, 27, 34, 35
      aige2: IgnoreEdges "Ignora lati 2" | input = aigv4(1) edges 26, 27, 40, 41
      acfr2: CollapseFaceRegions "Collassa le regioni della faccia 2"
        input = aige2(1) boundaries 10, 11
        narrowtol = manual
        maxwidth = 0.000215288
      aigv5: IgnoreVertices "Ignora vertici 5" | input = acfr2(1) points 13
      acle2: CollapseEdges "Collassa lati 2" | input = aigv5(1) edges 20, 22
      aigv6: IgnoreVertices "Ignora vertici 6" | input = acle2(1) points 13, 22, 23, 28, 29
    clf1: CollapseFaces "Collassa facce 1" (disabled)
    igv1: IgnoreVertices "Ignora vertici 1" (disabled) | input = acle1 27, 28
  part7 "interno" (3D, length unit m)
    cone1: Cone "Cono 1" | pos = {L-l, 0, 0}; axistype = x; r = d/2; h = l; specifytop = radius; rtop = d/2
    wp1: WorkPlane "plane slit 1"
      planetype = coordinates
      genpoints = {{0, incl+rh, 0}, {0, incl+rh, 0.02}, {rL*cos(alfa2), -D/2+rh, 0}}
      unite = on
      pt1: Point "Punto 1" | p = {0, p1}
      c1: Circle "Cerchio 1" | pos = {0, p4-p3/2}; r = p3/2
      ic1: InterpolationCurve "Curva di interpolazione 1"
        table = {{-p2/2, p1+rRT*tan(5[deg])}, {0, p1}, {p2/2, p1+rRT*tan(5[deg])}}
        starttang = {0.0142, -0.00419945584924}
        endtang = {0.0142, 0.00419945584924}
      tan1: Tangent "Tangente 1"
        edge = c1(1) boundaries 3
        type = point
        edge2 = ic1(1) boundaries 1
        point = ic1(1) points 2
      tan2: Tangent "Tangente 2" | edge = c1(1) boundaries 4; type = point; point = ic1(1) points 1
      csol1: ConvertToSolid "Converti in solido 1" | input = c1, ic1, tan1, tan2
      del1: Delete "Elimina entità 1" | input = csol1(1) boundaries 3, 4, 6, 8
    wp2: WorkPlane "interno profilo 1"
      planetype = coordinates
      genpoints = 
        {p1*cos(alfa2), incl+rh-p1*sin(alfa2), 0}
        {1, incl+rh-p1*sin(alfa2), 0}
        {p1*cos(alfa2), 1, 0}
      unite = on
      pol1: Polygon "Poligono 1"
        type = open
        source = table
        table = 
          {-p1*cos(gamma), (p5+p1)*sin(gamma)-(p1)*sin(alfa2)}
          {0, p5*sin(gamma)-(p1)*sin(alfa2)}
          {s1x-p1*cos(alfa2), s1y-(p1+s1x)*sin(alfa2)}
          {s2x-p1*cos(alfa2), s2y-(p1+s2x)*sin(alfa2)}
          {s3x-p1*cos(alfa2), s3y-(p1+s3x)*sin(alfa2)}
          {s4x-p1*cos(alfa2), s4y-(p1+s4x)*sin(alfa2)}
          {L-l-p1*cos(alfa2), d/2-(incl+rh-p1*sin(alfa2))}
    wp3: WorkPlane "Piano di lavoro 24"
      quickplane = yz
      quickorigin = vertexproj
      originvertex = wp2.pol1 points 1
      unite = on
      r1: Rectangle "Rettangolo 1" | pos = {-p5*sin(gamma)/2, 0}; base = center; size = {p5*sin(gamma), p2}
      fil1: Fillet "Raccordo 1" | point = r1(1) points 2, 3; radius = 0.1[mm]
    wp4: WorkPlane "Piano di lavoro 28"
      quickplane = yz
      quickoffsettype = vertex
      offsetvertex = wp2.pol1 points 2
      quickorigin = vertexproj
      originvertex = wp2.pol1 points 2
      unite = on
      r1: Rectangle "Rettangolo 1" | pos = {-p5*sin(gamma)/2, 0}; base = center; size = {p5*sin(gamma), p2}
      fil1: Fillet "Raccordo 1" | point = r1(1) points 2, 3; radius = 0.1[mm]
    wp5: WorkPlane "CS1"
      planetype = coordinates
      offset = s1x
      reverse = on
      genpoints = 
        {s1x, incl+rh+s1y-(s1x)*sin(alfa2), 0}
        {s1x, incl+rh+s1y-(p1+s1x)*sin(alfa2), D}
        {s1x, D, 0}
      origin = vertexproj
      unite = on
      ls1: LineSegment "Segmento 1"
        specify1 = coord
        coord1 = {(-p3/2-tipLine*(p4-p3/2-s1x))*tip100, -s1y}
        specify2 = coord
        coord2 = {0.5*(-Mup/2-p3/2-tipLine*(p4-p3/2-s1x)), 0}
      ls2: LineSegment "Segmento 2"
        specify1 = coord
        coord1 = {(+p3/2+tipLine*(p4-p3/2-s1x))*tip100, -s1y}
        specify2 = coord
        coord2 = {-0.5*(-Mup/2-p3/2-tipLine*(p4-p3/2-s1x)), 0}
      ls3: LineSegment "Segmento 3"
        vertex1 = ls1(1) points 2
        vertex2 = ls2(1) points 2
        coord2 = {0.25*(rT+l1up), -s3y}
      ls4: LineSegment "Segmento 4"
        vertex1 = ls1(1) points 1
        vertex2 = ls2(1) points 1
        coord2 = {0.25*(rT+l1up), -s3y}
      csol1: ConvertToSolid "Converti in solido 1" | input = ls1, ls2, ls3, ls4
      fil1: Fillet "Raccordo 1" | point = csol1(1) points 1, 4; radius = r1up/5
    loft1: Loft | profile = wp3, wp4, wp5; facepartitioning = grid
    wp6: WorkPlane "CS1.1"
      planetype = coordinates
      offset = s1x
      reverse = on
      genpoints = {{s1x, incl+rh+s1y-s1x*sin(alfa2), 0}, {s1x, incl+rh+s1y-s1x*sin(alfa2), D}, {s1x, D, 0}}
      origin = vertexproj
      unite = on
      ls1: LineSegment "Segmento 1"
        specify1 = coord
        coord1 = {(-p3/2-tipLine*(p4-p3/2-s1x))*tip100, -s1y}
        specify2 = coord
        coord2 = {0.5*(-Mup/2-p3/2-tipLine*(p4-p3/2-s1x)), 0}
      ls2: LineSegment "Segmento 2"
        specify1 = coord
        coord1 = {(+p3/2+tipLine*(p4-p3/2-s1x))*tip100, -s1y}
        specify2 = coord
        coord2 = {-0.5*(-Mup/2-p3/2-tipLine*(p4-p3/2-s1x)), 0}
      ls3: LineSegment "Segmento 3"
        vertex1 = ls1(1) points 2
        vertex2 = ls2(1) points 2
        coord2 = {0.25*(rT+l1up), -s3y}
      ls4: LineSegment "Segmento 4"
        vertex1 = ls1(1) points 1
        vertex2 = ls2(1) points 1
        coord2 = {0.25*(rT+l1up), -s3y}
      csol1: ConvertToSolid "Converti in solido 1" | input = ls1, ls2, ls3, ls4
      fil1: Fillet "Raccordo 1" | point = csol1(1) points 1, 4; radius = r1up/5
    wp7: WorkPlane "CS2"
      planetype = coordinates
      offset = s2x
      reverse = on
      genpoints = {{s2x, incl+rh+s2y-s2x*sin(alfa2), 0}, {s2x, incl+rh+s2y-s2x*sin(alfa2), D}, {s2x, D, 0}}
      origin = vertexproj
      unite = on
      ls1: LineSegment "Segmento 1"
        specify1 = coord
        coord1 = {(-p3/2-tipLine*(p4-p3/2-s2x))*tip100, -s2y}
        specify2 = coord
        coord2 = {-Mup/2, 0}
      ls2: LineSegment "Segmento 2"
        specify1 = coord
        coord1 = {(-(-p3/2-tipLine*(p4-p3/2-s2x)))*tip100, -s2y}
        specify2 = coord
        coord2 = {Mup/2, 0}
      ls3: LineSegment "Segmento 3"
        vertex1 = ls1(1) points 2
        vertex2 = ls2(1) points 2
        coord2 = {0.25*(rT+l1up), -s3y}
      ls4: LineSegment "Segmento 4"
        vertex1 = ls1(1) points 1
        vertex2 = ls2(1) points 1
        coord2 = {0.25*(rT+l1up), -s3y}
      csol1: ConvertToSolid "Converti in solido 1" | input = ls1, ls2, ls3, ls4
      fil1: Fillet "Raccordo 1" | point = csol1(1) points 1, 4; radius = r1up/2
    loft2: Loft | profile = wp6, wp7; facepartitioning = grid
    uni1: Union "Unione 3" | input = loft1, loft2; face = all
    wp8: WorkPlane "CS2.2"
      planetype = coordinates
      offset = s2x
      reverse = on
      genpoints = 
        {s2x*cos(alfa2*2-6[deg]), incl+rh+s2y-s2x*sin(alfa2), 0}
        {s2x*cos(alfa2*2-6[deg]), incl+rh+s2y-s2x*sin(alfa2), D}
        {s2x*cos(alfa2*2-6[deg]), D, 0}
      origin = vertexproj
      unite = on
      ls1: LineSegment "Segmento 1"
        specify1 = coord
        coord1 = {(-p3/2-tipLine*(p4-p3/2-s2x))*tip100, -s2y}
        specify2 = coord
        coord2 = {-Mup/2, 0}
      ls2: LineSegment "Segmento 2"
        specify1 = coord
        coord1 = {(-(-p3/2-tipLine*(p4-p3/2-s2x)))*tip100, -s2y}
        specify2 = coord
        coord2 = {Mup/2, 0}
      ls3: LineSegment "Segmento 3"
        vertex1 = ls1(1) points 2
        vertex2 = ls2(1) points 2
        coord2 = {0.25*(rT+l1up), -s3y}
      ls4: LineSegment "Segmento 4"
        vertex1 = ls1(1) points 1
        vertex2 = ls2(1) points 1
        coord2 = {0.25*(rT+l1up), -s3y}
      csol1: ConvertToSolid "Converti in solido 1" | input = ls1, ls2, ls3, ls4
      fil1: Fillet "Raccordo 1" | point = csol1(1) points 1, 4; radius = r1up/2
    wp9: WorkPlane "CS2.1" (disabled)
      planetype = coordinates
      offset = s2x
      reverse = on
      genpoints = {{s2x, incl+rh+s2y-s2x*sin(alfa2), 0}, {s2x, incl+rh+s2y-s2x*sin(alfa2), D}, {s2x, D, 0}}
      origin = vertexproj
      unite = on
      ls1: LineSegment "Segmento 1"
        specify1 = coord
        coord1 = {(-p3/2-tipLine*(p4-p3/2-s2x))*tip100, -s2y}
        specify2 = coord
        coord2 = {-Mup/2, 0}
      ls2: LineSegment "Segmento 2"
        specify1 = coord
        coord1 = {tip100*(-(-p3/2-tipLine*(p4-p3/2-s2x))), -s2y}
        specify2 = coord
        coord2 = {Mup/2, 0}
      ls3: LineSegment "Segmento 3"
        vertex1 = ls1(1) points 2
        vertex2 = ls2(1) points 2
        coord2 = {0.25*(rT+l1up), -s3y}
      ls4: LineSegment "Segmento 4"
        vertex1 = ls1(1) points 1
        vertex2 = ls2(1) points 1
        coord2 = {0.25*(rT+l1up), -s3y}
      csol1: ConvertToSolid "Converti in solido 1" | input = ls1, ls2, ls3, ls4
      fil1: Fillet "Raccordo 1" | point = csol1(1) points 1, 4; radius = r1up/2
    wp10: WorkPlane "CS3"
      planetype = coordinates
      offset = s3x
      reverse = on
      genpoints = {{s3x, incl+rh+s3y-s3x*sin(alfa2), 0}, {s3x, (incl+rh+s3y-s3x*sin(alfa2)), -D}, {s3x, -D, 0}}
      origin = vertexproj
      unite = on
      ls1: LineSegment "Segmento 1"
        specify1 = coord
        coord1 = {(-p3/2-tipLine*(p4-p3/2-s3x))*tip100, s3y}
        specify2 = coord
        coord2 = {-Mup/2, 0}
      ls2: LineSegment "Segmento 2"
        specify1 = coord
        coord1 = {(-(-p3/2-tipLine*(p4-p3/2-s3x)))*tip100, s3y}
        specify2 = coord
        coord2 = {Mup/2, 0}
      ls3: LineSegment "Segmento 3"
        vertex1 = ls1(1) points 2
        vertex2 = ls2(1) points 2
        coord2 = {0.25*(rT+l1up), -s3y}
      ls4: LineSegment "Segmento 4"
        vertex1 = ls1(1) points 1
        vertex2 = ls2(1) points 1
        coord2 = {0.25*(rT+l1up), -s3y}
      csol1: ConvertToSolid "Converti in solido 1" | input = ls1, ls2, ls3, ls4
      fil1: Fillet "Raccordo 1" | point = csol1(1) points 1, 4; radius = r1up/2
    loft3: Loft | profile = wp10, wp8; facepartitioning = grid
    uni2: Union "Unione 4" | input = loft3, uni1; face = all
    wp11: WorkPlane "CS3.1"
      planetype = coordinates
      offset = s3x
      reverse = on
      genpoints = {{s3x, incl+rh+s3y-s3x*sin(alfa2), 0}, {s3x, incl+rh+s3y-s3x*sin(alfa2), D}, {s3x, -D, 0}}
      origin = vertexproj
      unite = on
      ls1: LineSegment "Segmento 1"
        specify1 = coord
        coord1 = {(-p3/2-tipLine*(p4-p3/2-s3x))*tip100, s3y}
        specify2 = coord
        coord2 = {-Mup/2, 0}
      ls2: LineSegment "Segmento 2"
        specify1 = coord
        coord1 = {-(-p3/2-tipLine*(p4-p3/2-s3x))*tip100, s3y}
        specify2 = coord
        coord2 = {Mup/2, 0}
      ls3: LineSegment "Segmento 3"
        vertex1 = ls1(1) points 2
        vertex2 = ls2(1) points 2
        coord2 = {0.25*(rT+l1up), -s3y}
      ls4: LineSegment "Segmento 4"
        vertex1 = ls1(1) points 1
        vertex2 = ls2(1) points 1
        coord2 = {0.25*(rT+l1up), -s3y}
      csol1: ConvertToSolid "Converti in solido 1" | input = ls1, ls2, ls3, ls4
      fil1: Fillet "Raccordo 1" | point = csol1(1) points 1, 4; radius = r1up/2
    wp12: WorkPlane "CS40"
      planetype = coordinates
      genpoints = {{s4x, incl+rh+s4y-s4x*sin(alfa2), 0}, {s4x, 1, 0}, {s4x, incl+rh+s4y-s4x*sin(alfa2), D}}
      unite = on
      pol2: Polygon "Poligono 2" | source = table; table = {{-h1, -l1down/2}, {-h1, l1down/2}, {0, l1up/2}, {0, -l1up/2}}
      fil3: Fillet "Raccordo 3" | point = pol2(1) points 1, 2; radius = r1down
      fil4: Fillet "Raccordo 4" | point = fil3(1) points 4, 5; radius = r1up
    loft4: Loft | profile = wp11, wp12; facepartitioning = grid
    uni3: Union "Unione 5" | input = loft4, uni2; face = all
    wp13: WorkPlane "CS40.1"
      planetype = coordinates
      genpoints = {{s4x, incl+rh+s4y-s4x*sin(alfa2), 0}, {s4x, 1, 0}, {s4x, incl+rh+s4y-s4x*sin(alfa2), D}}
      unite = on
      pol2: Polygon "Poligono 2" | source = table; table = {{-h1, -l1down/2}, {-h1, l1down/2}, {0, l1up/2}, {0, -l1up/2}}
      fil3: Fillet "Raccordo 3" | point = pol2(1) points 1, 2; radius = r1down
      fil4: Fillet "Raccordo 4" | point = fil3(1) points 4, 5; radius = r1up
    wp14: WorkPlane "CS6" | planetype = faceparallel; face = cone1(1) boundaries 3; unite = on
      c1: Circle "Cerchio 1" | r = d/2
    loft5: Loft | profile = wp13, wp14; facepartitioning = grid
    wp15: WorkPlane "Piano di lavoro 29" (disabled)
      quickplane = yz
      quickoffsettype = vertex
      offsetvertex = wp9.pol1 points 2
      quickorigin = vertexproj
      originvertex = wp9.pol1 points 2
      unite = on
      r1: Rectangle "Rettangolo 1" | pos = {-p5*sin(gamma)/2, 0}; base = center; size = {p5*sin(gamma), p2}
    loft6: Loft (disabled)
    uni4: Union "Unione 6" | input = loft5, uni3; face = all
    wp16: WorkPlane "CS40.2" (disabled)
      planetype = coordinates
      genpoints = {{s4x, incl+rh+s4y-s4x*sin(alfa2), 0}, {s4x, 1, 0}, {s4x, incl+rh+s4y-s4x*sin(alfa2), D}}
      unite = on
      pol2: Polygon "Poligono 2" | source = table; table = {{-h1, -l1down/2}, {-h1, l1down/2}, {0, l1up/2}, {0, -l1up/2}}
      fil3: Fillet "Raccordo 3" | point = pol2(1) points 1, 2; radius = r1down
      fil4: Fillet "Raccordo 4" | point = fil3(1) points 4, 5; radius = r1up
    uni5: Union "Unione 7" | input = cone1, uni4; face = all
    rev1: Revolve "Ruota 2"
      workplane = wp1
      input = wp1
      angle1 = 15
      angle2 = -0.5
      pos = {p1, p1}
      axis = {1, 0}
      revaxis = {{p1, 1}, {p1, 0}}
    uni6: Union "Unione 1" | input = rev1, uni5; face = all
    uni7: Union "Unione 9" (disabled) | keep = on; face = all
    dif1: Difference "Differenza 6" (disabled)
    del1: Delete "Elimina entità 4" (disabled)
    wp17: WorkPlane "Piano di lavoro 25" | origin = vertexproj; unite = on
      r1: Rectangle "Rettangolo 1" | pos = {-2*p1, incl}; size = {3*p1, 5*p1}
    rev2: Revolve "Ruota 4"
      workplane = wp17
      input = wp17
      angle1 = -50
      angle2 = 50
      pos = {2*p1+rT, 0}
      revaxis = {{2*p1+rT, 0}, {0, 1}}
    dif2: Difference "Differenza 4" | input = uni6; input2 = rev2; face = all
    del2: Delete "Elimina entità 2" | input = wp2
    wp18: WorkPlane "plane slit 1.1" (disabled)
      planetype = coordinates
      genpoints = {{0, incl+rh, 0}, {0, incl+rh, 0.02}, {rL*cos(alfa2), -D/2+rh, 0}}
      unite = on
      r1: Rectangle "Rettangolo 1" | pos = {-p2/2*1.5, 0}; rot = 25; size = {p2/3, p4*1.1}
      mir1: Mirror "Riflessione 1" | input = r1; keep = on; axis = {1, 0}
    ext1: Extrude "Estrusione 1" (disabled)
      workplane = wp18
      inputhandling = keep
      distance = {D, -d}
      scale = {{1, 1}, {1, 1}}
      baseid = {3, 1, 0, 4, 2}
    dif3: Difference "Differenza 5" (disabled) | input2 = ext1; face = all
    del3: Delete "Elimina entità 3" (disabled)
    cone2: Cone "Cono 2" (disabled)
      pos = {L-l*0.855, 0, 0}
      axistype = x
      r = d/2*0.8
      h = Lp-L+l*0.85
      ang = -1.6
      rtop = 0.0005
    sph1: Sphere "Sfera 1" (disabled) | pos = {Lp-L+l*0.85+Lp/11, 0, 0}; r = Lp/20
    uni8: Union "Unione 2" (disabled) | input = cone2; face = all
    uni9: Union "Unione 8" (disabled) | input = sph1, 
  part8 "Mouthpiece-to-print" (3D, length unit m)
    pi1: PartInstance "Mouthpiecepieno 1"
      part = part6
      selkeepnoncontr = off
      lengthunit = m
      outputwptag = {wp1, wp2, wp3, wp4, wp5, wp6, wp7, wp8, wp9, wp10, wp11, wp12, wp13, wp14, wp15, wp16, wp17, wp18, wp19, wp20, wp21}
      outputwpmatrix = 
        {0, 0, 0, 1, 0, 0, 0, 1, 0}
        {0, 0, 0, 1, 0, 0, 0, 1, 0}
        {0, 0, 0, 1, 0, 0, 0, 1, 0}
        {0, 0, 0, 1, 0, 0, 0, 0, 1}
        {}
        {0, -0.0063448295779, 0, 0, -0.0063448295779, 1, 0.996565502498, -0.0891530370901, 0}
        {}
        {0.001594504804, -0.00647732270992, 0, 1.0015945048, -0.00647732270992, 0, 0.001594504804, 0.99352267729, 0}
        {0.001594504804, -0.00647732270992, 0, 1.0015945048, -0.00647732270992, 0, 0.001594504804, 0.99352267729, 0}
        {}
        {0.0052959, -0.00391317356407, 0, 0.0052959, -0.00391317356407, 1, 0.0052959, 0.996086826436, 0}
        {0.0017653, -0.00496701090662, 0, 0.0017653, -0.00496701090662, 1, 0.0017653, 0.995032989093, 0}
        {0.0181483, 0.0022234422297, 0, 0.0181483, 0.0022234422297, 1, 0.0181483, -0.99777655777, 0}
        {0.036225, 0.00933384310497, 0, 0.036225, 0.00933384310497, 1, 0.036225, -0.990666156895, 0}
        {0.036225, 0.00933384310497, 0, 0.036225, 1.0093338431, 0, 0.036225, 0.00933384310497, 1}
        {0.0773158789714, -0.0112052896354, -0.00426543692741, 1.1539200311, -0.0393971615241, -0.00426543692741, 0.0773158789714, -0.0112052896354, 1.07270776702}
        {0.001594504804, -0.00647732270992, 0, 0.001594504804, -0.00647732270992, 1, 0.191905712444, -0.98820113532, 0}
        {0.036225, 0.00933384310497, 0, 0.036225, 1.0093338431, 0, 0.036225, 0.00933384310497, 1}
        {0.001594504804, -0.00647732270992, 0, 0.998160007302, -0.0892855302221, 0, 0.0844027123162, 0.990088179788, 0}
        {0.001594504804, -0.00647732270992, 0, 1.0015945048, -0.00647732270992, 0, 0.001594504804, 0.99352267729, 0}
        {0, 0, 0, 1, 0, 0, 0, 1, 0}
    pi2: PartInstance "interno 1"
      part = part7
      selnamedom = Loft 4
      selshowdom = on
      seltagdom = pi2_loft2.dom
      selkeepnoncontr = off
      lengthunit = m
      outputwptag = {wp1, wp2, wp3, wp4, wp5, wp6, wp7, wp8, wp9, wp10, wp11, wp12, wp13, wp14, wp15, wp16, wp17, wp18}
      outputwpmatrix = 
        {0, -0.0063448295779, 0, 0, -0.0063448295779, 1, 0.996565502498, -0.0891530370901, 0}
        {0.001594504804, -0.00647732270992, 0, 1.0015945048, -0.00647732270992, 0, 0.001594504804, 0.99352267729, 0}
        {0, -0.00578814132893, 0, 0, 0.994211858671, 0, 0, -0.00578814132893, 1}
        {0.001594504804, -0.00587187885892, 0, 0.001594504804, 0.994128121141, 0, 0.001594504804, -0.00587187885892, 1}
        {0.0017653, -0.00496701090662, 0, 0.0017653, -0.0093834055701, 0.999990247682, 0.0017653, 0.995023236775, 0.00441639466348}
        {0.0017653, -0.00496701090662, 0, 0.0017653, -0.00496701090662, 1, 0.0017653, 0.995032989093, 0}
        {0.0052959, -0.00391317356407, 0, 0.0052959, -0.00391317356407, 1, 0.0052959, 0.996086826436, 0}
        {0.00528602207896, -0.00391317356407, 0, 0.00528602207896, -0.00391317356407, 1, 0.00528602207896, 0.996086826436, 0}
        {0.0052959, -0.00391317356407, 0, 0.0052959, -0.00391317356407, 1, 0.0052959, 0.996086826436, 0}
        {0.0181483, 0.0022234422297, 0, 0.0181483, 0.0022234422297, -1, 0.0181483, -0.99777655777, 0}
        {0.0181483, 0.0022234422297, 0, 0.0181483, 0.0022234422297, 1, 0.0181483, -0.99777655777, 0}
        {0.036225, 0.00933384310497, 0, 0.036225, 1.0093338431, 0, 0.036225, 0.00933384310497, 1}
        {0.036225, 0.00933384310497, 0, 0.036225, 1.0093338431, 0, 0.036225, 0.00933384310497, 1}
        {0.04485, 0, 0, 0.04485, 0, -1, 0.04485, -1, 0}
        {}
        {0.036225, 0.00933384310497, 0, 0.036225, 1.0093338431, 0, 0.036225, 0.00933384310497, 1}
        {0, 0, 0, 1, 0, 0, 0, 1, 0}
        {0, -0.0063448295779, 0, 0, -0.0063448295779, 1, 0.996565502498, -0.0891530370901, 0}
    dif1: Difference "Differenza 1" | input = pi1; input2 = pi2

Materials
  mat12: Common "Air" on all domains
    def "Basic"
      thermalexpansioncoefficient = alpha_p(pA,T)
      molarmass = 0.02897[kg/mol]
      bulkviscosity = muB(T)
      dynamicviscosity = eta(T)
      ratioofspecificheat = 1.4
      electricconductivity = 0[S/m]
      heatcapacity = Cp(T)
      density = rho(pA,T)
      thermalconductivity = k(T)
      soundspeed = cs(T)
      acousticimpedance = rho*c
      eta: Piecewise | arg = T; pieces = {200.0, 1600.0, -8.38278E-7+8.35717342E-8*T^1-7.69429583E-11*T^2+4.6437266E-14*T^3-1.06585607E-17*T^4}; argunit = K; fununit = Pa*s
      Cp: Piecewise | arg = T; pieces = {200.0, 1600.0, 1047.63657-0.372589265*T^1+9.45304214E-4*T^2-6.02409443E-7*T^3+1.2858961E-10*T^4}; argunit = K; fununit = J/(kg*K)
      rho: Analytic | expr = pA*0.02897/R_const[K*mol/J]/T; args = {pA, T}; dermethod = manual; argders = {{pA, d(pA*0.02897/R_const/T,pA)}, {T, d(pA*0.02897/R_const/T,T)}}; argunit = Pa,K; fununit = kg/m^3
      k: Piecewise | arg = T; pieces = {200.0, 1600.0, -0.00227583562+1.15480022E-4*T^1-7.90252856E-8*T^2+4.11702505E-11*T^3-7.43864331E-15*T^4}; argunit = K; fununit = W/(m*K)
      cs: Analytic | expr = sqrt(1.4*R_const[K*mol/J]/0.02897*T); args = T; dermethod = manual; argunit = K; fununit = m/s
      an1: Analytic | funcname = alpha_p; expr = -1/rho(pA,T)*d(rho(pA,T),T); args = {pA, T}; argunit = Pa, K; fununit = 1/K
      an2: Analytic "Analytic 2a" | funcname = muB; expr = 0.6*eta(T); args = T; argunit = K; fununit = Pa*s
    NonlinearModel
      BA = (def.gamma+1)/2
    idealGas
      Rs = R_const/Mn
      heatcapacity = Cp(T)
      ratioofspecificheat = 1.4
      molarmass = 0.02897
      Cp: Piecewise | arg = T; pieces = {200.0, 1600.0, 1047.63657-0.372589265*T^1+9.45304214E-4*T^2-6.02409443E-7*T^3+1.2858961E-10*T^4}; argunit = K; fununit = J/(kg*K)

Physics
  acpr2: PressureAcoustics "Pressione acustica, dominio delle frequenze 3" on all domains
    dependent variable p5
    cref.cref = 346.1166[m/s]
    fpam1: FrequencyPressureAcousticsModel "Pressione acustica 1" (default)
      FluidModel = IdealGas
      minput_temperature = 298.15[K]
      minput_relativehumidity = 0.8
    shb1: SoundHard "Condizione al contorno di parete rigida 1" (default)
    init1: init "Valori iniziali 1" (default)
    swr1: SphericalWaveRadiation "Irraggiamento da onda sferica 1" on boundaries 48, 50, 52, 54, 60-63
      r0 = {Ltube+L-l*inton, 0, 0}
    pr1: Pressure "Pressione 1a" on boundaries 1, 2 | p0 = 1000
    ishb1: InteriorSoundHard "Parete rigida interna (parete) 1" on boundaries 47, 49, 51, 53
  lnsf3: LinearizedNavierStokesFrequency "Navier-Stokes linearizzate, dominio delle frequenze" on domains 1-4
    dependent variable p
    EquationSettings.AdiabaticFormulation = 0
    cref.cref = 346.1166[m/s]
    lnsm1: LinearizedNavierStokesModel "Modello di Navier-Stokes linearizzato 1" (default)
      minput_temperature = 298.15[K]
      GTST0 = 1
      GTSconv = 0
    wall1: Wall "Parete 1" (default) | ThermalCondition = Isothermal
    init1: init "Valori iniziali 1" (default)
    press1: PrescribedPressure "Pressione imposta 1" on boundaries 5, 6 | p_p = 1000
    iwall1: InteriorWall "Parete interna 1" on boundaries 43, 45, 49, 53
    slip1: Slip "Scorrimento 1" on boundaries 48, 50, 52, 54, 60-63

Mesh
  mesh4 "Mesh 4"
    size: MeshSizeDefault "Dimensioni" | table = cfd; hmin = 0.00254; hauto = 7
    ftet1: FreeTet "Tetraedrica non strutturata 1" on remaining entities
    bl1: BndLayer "Strato limite 1" on boundaries 1-7, 9-42, 47, 49, 51, 53, 55
      blp: BndLayerProp "Proprietà dello strato limite" on no edges | blnlayers = 4

Studies
  std4 "Helmholtz"
    param1: Parametric "A-A1-A2-B-B1-B2-C-C1-C2" | switchname = default; switchlistarr = 1,4,9; switchcase = user
    freq1: Frequency "Hlm" | plist = range(100,5,1200); solve for = {acpr2}
  std6 "NSLf3"
    param1: Parametric "A-A1-A2-B-B1-B2-C-C1-C2" | switchname = default; switchlistarr = 1,4; switchcase = user
    freq2: Frequency "NSL" | plist = range(100,5,1200); mesh = {geom4, mesh4}

Solver configurations
  sol20 "Soluzione 20" (study std4)
    v1: Variables "Variabili dipendenti 1"
    s1: Stationary "Solutore stazionario 1"
      p1: Parametric "Parametrico 1" | pname = freq; plistarr = range(100,5,1200); punit = Hz; pcontinuationmode = no
      fc1: FullyCoupled "Accoppiamento completo 1" | linsolver = d1
      d1: Direct "Suggested Direct Solver (acpr2)"
  sol21 "Soluzioni parametriche 3" (study std4)
  sol36 "Soluzione 36" (study std6)
    v1: Variables "Variabili dipendenti 1"
    s1: Stationary "Solutore stazionario 1"
      p1: Parametric "Parametrico 1" | pname = freq; plistarr = range(100,5,1200); punit = Hz; pcontinuationmode = no
      fc1: FullyCoupled "Accoppiamento completo 1" | linsolver = d1
      d1: Direct "Suggested Direct Solver (lnsf3)" | linsolver = pardiso; pivotperturb = 1.0E-13
  sol38 "Soluzioni parametriche 6" (study std6)

Datasets
  dset10: Solution | solution = sol20
  dset11: Solution | solution = sol21
  cln1: CutLine3D "Linea di taglio 3D 1"
    data = dset10
    genpoints = {{0.0493312, -6.11E-4, 0.00627272}, {0.0527023, 0.00574161, 0.00286215}}
  dset17: Solution | solution = sol36
  dset18: Solution | solution = sol36
  dset21: Solution | solution = sol38
  dset22: Solution | solution = sol38
  dset31: Solution "Soluzione della sonda 31" | solution = sol36
  int2: Integral "Hvend" on boundaries 55 | data = dset31
  int3: Integral "NSPend" on boundaries 55 | data = dset31
  int4: Integral "NSvend" on boundaries 55 | data = dset31
  int8: Integral "NSIMPend" on boundaries 55 | data = dset31
  int10: Integral "NSpsf" | data = dset31
  dset32: Solution "Soluzione della sonda 32" | solution = sol20
  max1: Maximum "Himpend" on boundaries 55 | data = dset32
  max2: Maximum "HPend" on boundaries 55 | data = dset32

Derived values
  pev8: EvalPoint "Hvend" | data = int2; table = new; expr = acpr2.v_inst
  pev9: EvalPoint "NSPend" | data = int3; table = new; expr = abs(p)
  pev10: EvalPoint "NSvend" | data = int4; table = new; expr = lnsf3.v_inst
  pev14: EvalPoint "NSIMPend" | data = int8; table = new; expr = abs(p)/(1+lnsf3.v_inst)
  pev16: EvalPoint "NSpsf" | data = int10; table = new; expr = abs(p)
  pev17: EvalPoint "Himpend" | data = max1; table = tbl1; expr = abs(p5/1000/acpr2.v_inst)
  pev18: EvalPoint "HPend" | data = max2; table = tbl2; expr = abs(p5/1000)

Tables
  tbl1: Table "Z"
    freq (Hz) | abs(p5/1000/acpr2.v_inst) (Pa*s/m), Himpend
    200 | 91.8793
    205 | 104.441
    210 | 121.902
    215 | 147.789
    220 | 190.05
    225 | 271.006
    230 | 483.495
    235 | 1441.5
    240 | 563.26
    245 | 273.517
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  tbl2: Table "P"
    freq (Hz) | abs(p5/1000) (Pa), HPend
    200 | 0.01187
    205 | 0.0121324
    210 | 0.01241
    215 | 0.0127041
    220 | 0.0130159
    225 | 0.0133465
    230 | 0.0136976
    235 | 0.0140707
    240 | 0.0144676
    245 | 0.0148902
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
Plots
  pg134: PlotGroup3D "Pressione acustica (lnsf2) 1" | data = dset21
    mslc1: Multislice | expr = lnsf2.p_t
  pg135: PlotGroup3D "Velocità acustica (lnsf2) 1" | data = dset21
    mslc1: Multislice | expr = lnsf2.v_inst
  pg144: PlotGroup3D "Pressione acustica (acpr2) 2" | data = dset11
    surf1: Surface "Superficie 1" | expr = acpr2.p_t
  pg145: PlotGroup3D "Livello di pressione sonora (acpr2) 2" | data = dset11
  pg146: PlotGroup3D "Pressione acustica, linee di livello (acpr2) 2" | data = dset11
    iso1: Isosurface "Isosuperficie 1" | expr = acpr2.p_t
  pg150: PlotGroup1D "GRUPPO PRESSIONI" (disabled) | data = none
    ptgr1: PointGraph "P_LNSF3A" (disabled) on points 70 | data = dset21; expr = abs(p)
    ptgr3: PointGraph "P_LNSF3B" (disabled) | data = dset21; expr = abs(p)
    ptgr4: PointGraph "P_LNSF3C" (disabled) | data = dset21; expr = abs(p)
    ptgr2: PointGraph "P_HlmA" (disabled) on points 70 | data = dset11; expr = abs(p5)
    ptgr5: PointGraph "P_HlmB" (disabled) on points 70 | data = dset11; expr = abs(p5)
    ptgr6: PointGraph "P_HlmC" on points 70 | data = dset10; expr = abs(p5)
  pg151: PlotGroup1D "GRUPPO VELOCITA" (disabled) | data = none
    ptgr1: PointGraph "V_LNSF3A" (disabled) | data = dset21; expr = lnsf3.v_inst
    ptgr3: PointGraph "V_LNSF3B" (disabled) | data = dset21; expr = lnsf3.v_inst
    ptgr4: PointGraph "V_LNSF3C" (disabled) | data = dset21; expr = lnsf3.v_inst
    ptgr2: PointGraph "V_HlmA" on points 70 | data = dset11; expr = abs(acpr2.v_inst)
    ptgr5: PointGraph "V_HlmB" (disabled) on points 70 | data = dset11; expr = acpr2.v_inst
    ptgr6: PointGraph "V_HlmC" (disabled) on points 70 | data = dset11; expr = acpr2.v_inst
    ptgr7: PointGraph "V_LNSF3A 1" (disabled) | data = dset21; expr = abs(lnsf3.p_t)
  pg164: PlotGroup1D "GRUPPO IMPEDENZE" (disabled) | data = none
    ptgr1: PointGraph "P_LNSF3A" (disabled) on points 70 | data = dset21; expr = abs(p)/lnsf3.v_inst
    ptgr3: PointGraph "P_LNSF3B" (disabled) | data = dset21; expr = abs(p)/lnsf3.v_inst
    ptgr4: PointGraph "P_LNSF3C" (disabled) | data = dset21; expr = abs(p)/lnsf3.v_inst
    ptgr2: PointGraph "P_HlmA" (disabled) on points 70 | data = dset11; expr = abs(p5)/acpr2.v_inst
    ptgr5: PointGraph "P_HlmB" (disabled) on points 70 | data = dset11; expr = abs(p5)/acpr2.v_inst
    ptgr6: PointGraph "P_HlmC" on points 70 | data = dset10; expr = abs(p5)/acpr2.v_inst
  pg165: PlotGroup1D "Sonda H impedance" | data = none
    tblp1: Table "Grafico della tabella della sonda 1" | table = tbl1
  pg166: PlotGroup1D "Sonda H Pressure" | data = none
    tblp1: Table "Grafico della tabella della sonda 1" | table = tbl2

Exports
  plot14: Plot "Zex"
    filename = C:\Users\great\Desktop\Esami2020-2021\POLIMI\Project course\Mouthpiece research\MouthpieceDATA\SondaENDH\Z_sonda_HF4Bcen.txt
  plot15: Plot "Pex"
    filename = C:\Users\great\Desktop\Esami2020-2021\POLIMI\Project course\Mouthpiece research\MouthpieceDATA\SondaENDH\P_sonda_HF4Bcen.txt