// COMSOL Multiphysics 5.6.0.341 model "main_3D_cone.mph"
// Outline of the model tree

Parameters
  r1 = 13*0.5[mm]
  L = 0.735[m]
  alfa = 1.6[deg]
  R2 = r1+tan(alfa)*L
  Lac = L+0.6*R2

Probes
  bnd1: Boundary "ExitH" on boundaries 23 | type = maximum; expr = abs((p2/1000)/acpr.v_inst); unit = Pa*s/m; table = tbl5
  bnd3: Boundary "Sonda sul contorno 3" (disabled) on boundaries 23
    type = integral
    probename = bnd2
    expr = abs(ae.p/ae.v_inst)
    unit = kg/s
    table = tbl2
  bnd4: Boundary "ExitNS" on boundaries 23
    type = integral
    expr = abs((p/1000)/lnsf.v_inst)/(pi*R2^2)
    unit = Pa*s/m
    table = tbl3
  dom1: Domain "sfera" on domains 4 | type = maximum; expr = abs(lnsf.p_t); unit = Pa; table = tbl4
  bnd5: Boundary "InputH" on boundaries 1 | type = maximum; expr = abs((p2/1000)/acpr.v_inst); unit = Pa*s/m; table = tbl1
  bnd6: Boundary "InputNS" on boundaries 1
    type = integral
    expr = abs((p/1000)/lnsf.v_inst)/(pi*r1^2)
    unit = Pa*s/m
    table = tbl3
  dom2: Domain "Inlet-tract Media" on domains 1 | expr = abs(p/1000/lnsf.v_inst); unit = Pa*s/m; table = tbl2
  dom3: Domain "inlect-tract Max" on domains 1
    type = maximum
    expr = abs(p/1000/lnsf.v_rms)
    unit = Pa*s/m
    table = tbl2
  dom4: Domain "inlect-tract HMax" on domains 1
    type = maximum
    expr = abs(p2/1000/acpr.v_inst)
    unit = Pa*s/m
    table = tbl1

Geometry
  geom1 "Geometria 1" (3D, length unit m)
    cone1: Cone "Cono 1" | axistype = x; r = r1; h = L; ang = -alfa; rtop = R2
    cone2: Cone "Cono 2" | pos = {L, 0, 0}; axistype = x; r = R2; h = 0.6*R2; specifytop = radius; ang = 70; rtop = 0
    sph1: Sphere "Sfera 1" | pos = {L+R2, 0, 0}; r = 2*R2
    cone3: Cone "Cono 3" | axistype = x; r = r1; h = L/25; ang = -alfa
    fin: Finalize "Forma l'unione"

Materials
  mat1: Common "Air" on all domains
    def "Basic"
      thermalexpansioncoefficient = alpha_p(pA,T)
      molarmass = 0.02897[kg/mol]
      bulkviscosity = muB(T)
      dynamicviscosity = eta(T)
      ratioofspecificheat = 1.4
      electricconductivity = 0[S/m]
      heatcapacity = Cp(T)
      density = rho(pA,T)
      thermalconductivity = k(T)
      soundspeed = cs(T)
      acousticimpedance = rho*c
      eta: Piecewise | arg = T; pieces = {200.0, 1600.0, -8.38278E-7+8.35717342E-8*T^1-7.69429583E-11*T^2+4.6437266E-14*T^3-1.06585607E-17*T^4}; argunit = K; fununit = Pa*s
      Cp: Piecewise | arg = T; pieces = {200.0, 1600.0, 1047.63657-0.372589265*T^1+9.45304214E-4*T^2-6.02409443E-7*T^3+1.2858961E-10*T^4}; argunit = K; fununit = J/(kg*K)
      rho: Analytic | expr = pA*0.02897/R_const[K*mol/J]/T; args = {pA, T}; dermethod = manual; argders = {{pA, d(pA*0.02897/R_const/T,pA)}, {T, d(pA*0.02897/R_const/T,T)}}; argunit = Pa,K; fununit = kg/m^3
      k: Piecewise | arg = T; pieces = {200.0, 1600.0, -0.00227583562+1.15480022E-4*T^1-7.90252856E-8*T^2+4.11702505E-11*T^3-7.43864331E-15*T^4}; argunit = K; fununit = W/(m*K)
      cs: Analytic | expr = sqrt(1.4*R_const[K*mol/J]/0.02897*T); args = T; dermethod = manual; argunit = K; fununit = m/s
      an1: Analytic | funcname = alpha_p; expr = -1/rho(pA,T)*d(rho(pA,T),T); args = {pA, T}; argunit = Pa, K; fununit = 1/K
      an2: Analytic "Analytic 2a" | funcname = muB; expr = 0.6*eta(T); args = T; argunit = K; fununit = Pa*s
    NonlinearModel
      BA = (def.gamma+1)/2
    idealGas
      Rs = R_const/Mn
      heatcapacity = Cp(T)
      ratioofspecificheat = 1.4
      molarmass = 0.02897
      Cp: Piecewise | arg = T; pieces = {200.0, 1600.0, 1047.63657-0.372589265*T^1+9.45304214E-4*T^2-6.02409443E-7*T^3+1.2858961E-10*T^4}; argunit = K; fununit = J/(kg*K)

Physics
  lnsf: LinearizedNavierStokesFrequency "Navier-Stokes linearizzate, dominio delle frequenze" on all domains
    dependent variable p
    cref.cref = 346.1166[m/s]
    lnsm1: LinearizedNavierStokesModel "Modello di Navier-Stokes linearizzato 1" (default)
      minput_temperature = 298.15[K]
      GTSp0 = 0
      GTSu0 = 0
      GTST0 = 1
      GTSrho0 = 0
      GTSconv = 0
    wall1: Wall "Parete 1" (default)
    init1: init "Valori iniziali 1" (default)
    press1: PrescribedPressure "Pressione imposta 1" on boundaries 1 | p_p = 1000
    iwall1: InteriorWall "Parete interna 1" on boundaries 15, 17, 19, 21
    slip3: Slip "Scorrimento 3" on boundaries 16, 18, 20, 22, 28-31
  acpr: PressureAcoustics "Pressione acustica, dominio delle frequenze" on domains 1-5
    dependent variable p2
    ShapeProperty.order_pressure = 1
    cref.cref = 346.1166[m/s]
    fpam1: FrequencyPressureAcousticsModel "Pressione acustica 1" (default) | minput_temperature = 298.15[K]
    shb1: SoundHard "Condizione al contorno di parete rigida 1" (default)
    init1: init "Valori iniziali 1" (default)
    pr1: Pressure "Pressione 1" on boundaries 1 | p0 = 1000
    swr1: SphericalWaveRadiation "Irraggiamento da onda sferica 1" on boundaries 16, 18, 20, 22, 28-31 | r0 = {L, 0, 0}
    ishb1: InteriorSoundHard "Parete rigida interna (parete) 1" on boundaries 15, 17, 19, 21

Mesh
  mesh1 "Mesh 1"
    size: MeshSizeDefault "Dimensioni" | table = cfd; hmax = 0.00755; hmin = 0.00225; hgrad = 1.15
    ftet1: FreeTet "Tetraedrica non strutturata 1" on remaining entities

Studies
  std1 "LNS"
    freq: Frequency "Dominio della frequenza" | plist = range(100,10,1000); solve for = {lnsf}
  std2 "Helmholtz"
    freq: Frequency "Dominio della frequenza" | plist = range(100,5,1200); solve for = {acpr}

Solver configurations
  sol1 "Soluzione 1" (study std1)
    v1: Variables "Variabili dipendenti 1"
    s1: Stationary "Solutore stazionario 1"
      p1: Parametric "Parametrico 1" | pname = freq; plistarr = range(100,10,1000); punit = Hz; pcontinuationmode = no
      fc1: FullyCoupled "Accoppiamento completo 1" | linsolver = i1
      i1: Iterative "Suggested Iterative Solver (GMRES with Direct Precon.) (lnsf)" | maxlinit = 1000
        dp1: DirectPreconditioner "Precondizionatore diretto 1" | linsolver = pardiso; pivotperturb = 1.0E-13
        dp2: DirectPreconditioner "Precondizionatore diretto 2" | linsolver = pardiso
  sol2 "Soluzione 2" (study std2)
    v1: Variables "Variabili dipendenti 1"
    s1: Stationary "Solutore stazionario 1"
      p1: Parametric "Parametrico 1" | pname = freq; plistarr = range(100,5,1200); punit = Hz; pcontinuationmode = no
      fc1: FullyCoupled "Accoppiamento completo 1" | linsolver = d1
      d1: Direct "Suggested Direct Solver (acpr)"

Datasets
  dset1: Solution | solution = sol1
  dset2: Solution | solution = sol2
  dset3: Solution "Soluzione della sonda 3" | solution = sol2
  dset4: Solution "Soluzione della sonda 4" | solution = sol2
  dset5: Solution "Soluzione della sonda 5" | solution = sol2
  int1: Integral "Sonda sul contorno 3" | data = dset3
  max1: Maximum "ExitH" on boundaries 23 | data = dset3
  int2: Integral "ExitNS" on boundaries 23 | data = dset3
  max2: Maximum "InputH" on boundaries 1 | data = dset3
  int4: Integral "InputNS" on boundaries 1 | data = dset3
  max3: Maximum "sfera" on domains 4 | data = dset3
  avh1: Average "Inlet-tract Media" on domains 1 | data = dset3
  max4: Maximum "inlect-tract Max" on domains 1 | data = dset3
  max5: Maximum "inlect-tract HMax" on domains 1 | data = dset3

Derived values
  pev2: EvalPoint "Sonda sul contorno 3" | data = int1; table = tbl2; expr = abs(ae.p/ae.v_inst)
  pev3: EvalPoint "ExitH" | data = max1; table = tbl5; expr = abs((p2/1000)/acpr.v_inst)
  pev4: EvalPoint "ExitNS" | data = int2; table = tbl3; expr = abs((p/1000)/lnsf.v_inst)/(pi*R2^2)
  pev6: EvalPoint "InputH" | data = max2; table = tbl1; expr = abs((p2/1000)/acpr.v_inst)
  pev7: EvalPoint "InputNS" | data = int4; table = tbl3; expr = abs((p/1000)/lnsf.v_inst)/(pi*r1^2)
  pev8: EvalPoint "sfera" | data = max3; table = tbl4; expr = abs(lnsf.p_t)
  pev9: EvalPoint "Inlet-tract Media" | data = avh1; table = tbl2; expr = abs(p/1000/lnsf.v_inst)
  pev10: EvalPoint "inlect-tract Max" | data = max4; table = tbl2; expr = abs(p/1000/lnsf.v_rms)
  pev11: EvalPoint "inlect-tract HMax" | data = max5; table = tbl1; expr = abs(p2/1000/acpr.v_inst)

Tables
  tbl1: Table "Tabella 1"
    freq (Hz) | abs((p2/1000)/acpr.v_inst) (Pa*s/m), InputH | abs(p2/1000/acpr.v_inst) (Pa*s/m), inlect-tract HMax
    100 | 606.689 | 664.937
    105 | 563.96 | 619.974
    110 | 521.681 | 575.376
    115 | 480.09 | 531.386
    120 | 439.409 | 488.238
    125 | 399.85 | 446.149
    130 | 361.606 | 405.323
    135 | 324.852 | 365.949
    140 | 289.747 | 328.194
    145 | 256.429 | 292.209
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  tbl2: Table "Tabella delle sonde 2"
    freq (Hz) | abs(p/1000/lnsf.v_inst) (Pa*s/m), Inlet-tract Media | abs(p/1000/lnsf.v_rms) (Pa*s/m), inlect-tract Max
    100 | nan | nan
    105 | nan | nan
    110 | nan | nan
    115 | nan | nan
    120 | nan | nan
    125 | nan | nan
    130 | nan | nan
    135 | nan | nan
    140 | nan | nan
    145 | nan | nan
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  tbl3: Table "Tabella 3"
    freq (Hz) | abs((p/1000)/lnsf.v_inst)/(pi*R2^2) (Pa*s/m), ExitNS | abs((p/1000)/lnsf.v_inst)/(pi*r1^2) (Pa*s/m), InputNS
    100 | nan | nan
    105 | nan | nan
    110 | nan | nan
    115 | nan | nan
    120 | nan | nan
    125 | nan | nan
    130 | nan | nan
    135 | nan | nan
    140 | nan | nan
    145 | nan | nan
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  tbl4: Table "Tabella 4"
    freq (Hz) | abs(lnsf.p_t) (Pa), sfera
    100 | 0
    105 | 0
    110 | 0
    115 | 0
    120 | 0
    125 | 0
    130 | 0
    135 | 0
    140 | 0
    145 | 0
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  tbl5: Table "Tabella 5"
    freq (Hz) | abs((p2/1000)/acpr.v_inst) (Pa*s/m), ExitH
    100 | 67.3201
    105 | 77.2199
    110 | 90.9697
    115 | 109.081
    120 | 126.072
    125 | 132.211
    130 | 127.791
    135 | 114.131
    140 | 95.7761
    145 | 72.971
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
Plots
  pg1: PlotGroup3D "Pressione acustica (lnsf)" | data = dset1
    mslc1: Multislice | expr = lnsf.p_t
  pg2: PlotGroup3D "Velocità acustica (lnsf)" | data = dset1
    mslc1: Multislice | expr = lnsf.v_inst
  pg3: PlotGroup3D "Variazione della temperatura (lnsf)" | data = dset1
    mslc1: Multislice | expr = lnsf.T_t
  pg4: PlotGroup3D "Flusso medio di background (lnsf)" | data = dset1
    mslc1: Multislice | expr = lnsf.p0
    arwv1: ArrowVolume "Frecce su volume" | expr = {lnsf.u0x, lnsf.u0y, lnsf.u0z}
  pg5: PlotGroup1D "Gruppo di plot 1D 5" | data = none
    ptgr1: PointGraph "Grafico a punti 1" (disabled) on points 17 | data = dset1; expr = abs(p3)/lef.v_inst
    ptgr2: PointGraph "Grafico a punti 2" (disabled) on points 16 | data = dset2; expr = abs(p2)/acpr.v_inst
    tblp1: Table "Grafico tabella 1" (disabled)
    lnsg1: LineSegments "Segmenti di linea 1" (disabled) | data = dset1; xexpr = lnsf.freq; yexpr = lnsf.Lp_t
    mesh1: Mesh (disabled)
    lngr1: LineGraph "Grafico di linea 1" (disabled) on edges 38
      data = dset1
      expr = comp1.lnsf.v_inst
      xdataexpr = comp1.lnsf.freq
    ptp1: Particle1D "Particella 1" (disabled) | expr = comp1.lnsf.p_t
    oct1: OctaveBand "Banda d'ottava 1" (disabled) on boundaries 1
      data = dset1
      expr = abs(comp1.acpr.p_t)
      exprtype = power
      style = continuous
  pg6: PlotGroup3D "Pressione acustica (acpr)" | data = dset2
    surf1: Surface "Superficie 1" | expr = acpr.p_t
  pg7: PlotGroup3D "Livello di pressione sonora (acpr)" | data = dset2
    surf1: Surface "Superficie 1" | expr = acpr.Lp_t
  pg8: PlotGroup3D "Pressione acustica, linee di livello (acpr)" | data = dset2
    iso1: Isosurface "Isosuperficie 1" | expr = acpr.p_t
  pg9: PlotGroup1D "Gruppo di grafici della sonda 9"
    tblp1: Table "ImpEnd" | table = tbl1; xaxisdata = auto
    tblp2: Table "Grafico della tabella della sonda 2" | table = tbl1; xaxisdata = auto
    tblp3: Table "Grafico della tabella della sonda 3" | table = tbl1; xaxisdata = auto
    tblp4: Table "Grafico della tabella della sonda 4" | table = tbl5; xaxisdata = auto; plotcolumns = 2
    tblp5: Table "Grafico della tabella della sonda 5" | table = tbl1
  pg10: PlotGroup1D "Gruppo di grafici della sonda 10"
    tblp1: Table "Grafico della tabella della sonda 1" | table = tbl2; xaxisdata = auto; plotcolumns = {2, 3}
    tblp2: Table "Grafico della tabella della sonda 2" | table = tbl3; plotcolumns = {2, 3}
  pg11: PlotGroup1D "Gruppo di grafici della sonda 11"
    tblp1: Table "Grafico della tabella della sonda 1" | table = tbl4

Exports
  plot1: Plot "Grafico 1"
    filename = C:\Users\great\Desktop\Esami2020-2021\POLIMI\Project course\Mouthpiece research\Cone Data\Htest1Pressure3Dmeshfina.txt
  plot2: Plot "Grafico 2"
    filename = C:\Users\great\Desktop\Esami2020-2021\POLIMI\Project course\Mouthpiece research\Cone Data\NScone3D.txt